# OpenSim document version 30000
Model loadedwalking_subject07_adjusted_loaded_markered_adjusted:
  length_units: meters
  force_units: N
  gravity: 0 -9.80665 0
  credits:
    DeMers, M.S., Steele, K.M., Hamner S.R., Delp S.L., Loan J.P., Hoy M.G., Zajac F.E., Topp E.L., Rosen J.M., Thelen D.G., Anderson F.C., Seth A.
  publications:
    Notes: 3D, 23 DOF gait model created by D.G. Thelen, Univ. of Wisconsin-Madison, and Matt DeMers, Katherine Steel, Samuel Hamner, Ajay Seth, Frank C. Anderson, and Scott L. Delp, Stanford University. Lower extremity joint defintions based on Delp et al. (1990). Low back joint and anthropometry based on Anderson and Pandy (1999, 2001). Planar knee model of Yamaguchi and Zajac (1989). Hamner added arms adapted from Holzbaur et al., 2005. DeMers and Steele redefined the planar patella kinematics as a planar joint between the patella and femur instead of constraints between the patella and tibia. Quadriceps wrap through the patell to the tibial tuberocity in place of a separate patellar ligament. Delp, S.L., Loan, J.P., Hoy, M.G., Zajac, F.E., Topp E.L., Rosen, J.M.: An interactive graphics-based model of the lower extremity to study orthopaedic surgical procedures, IEEE Transactions on Biomedical Engineering, vol. 37, pp. 757-767, 1990. Yamaguchi G.T., Zajac F.E.: A planar model of the knee joint to characterize the knee extensor mechanism." J . Biomecl7. vol. 21. pp. 1-10. 1989. Anderson F.C., Pandy M.G.: A dynamic optimization solution for vertical jumping in three dimensions. Computer Methods in Biomechanics and Biomedical Engineering 2:201-231, 1999. Anderson F.C., Pandy M.G.: Dynamic optimization of human walking. Journal of Biomechanical Engineering 123:381-390, 2001. Holzbaur, KR, WM Murray and SL Delp, 2005. A model of the upper extremity for simulating musculoskeletal surgery and analyzing neuromuscular control. Ann Biomed Eng 33(6): 829-840.
  defaults: Thelen2003Muscle default: min_control=0.02 max_control=1 optimal_force=1 max_isometric_force=546
      optimal_fiber_length=0.0535 tendon_slack_length=0.078 pennation_angle_at_optimal=0 [radians]
      max_contraction_velocity=10 activation_time_constant=0.01 deactivation_time_constant=0.04 FmaxTendonStrain=0.033
      FmaxMuscleStrain=0.6 KshapeActive=0.5 KshapePassive=4 Af=0.3 Flen=1.8
  BodySet:
    Body ground: mass=0 mass_center=(0 0 0) inertia_xx=0 inertia_yy=0 inertia_zz=0 meshes=treadmill.vtp
    Body pelvis: mass=13.9443 mass_center=(-0.0814816 0 0) inertia_xx=0.1459334 inertia_yy=0.1459334
        inertia_zz=0.09105851 meshes=(sacrum.vtp pelvis.vtp l_pelvis.vtp)
      CustomJoint ground_pelvis: parent_body=ground location_in_parent=(0 0 0) location=(0 0 0)
        Coordinate pelvis_tilt: motion_type=rotational default_value=0 range=(-1.570796 1.570796) clamped=true
        Coordinate pelvis_list: motion_type=rotational default_value=0 range=(-1.570796 1.570796) clamped=true
        Coordinate pelvis_rotation: motion_type=rotational default_value=0 range=(-1.570796 1.570796) clamped=true
        Coordinate pelvis_tx: motion_type=translational default_value=0.12 range=(-5 5) clamped=true
        Coordinate pelvis_ty: motion_type=translational default_value=0.93 range=(-1 2) clamped=true
        Coordinate pelvis_tz: motion_type=translational default_value=0 range=(-3 3) clamped=true
        SpatialTransform:
          TransformAxis rotation1: coordinates=pelvis_tilt axis=(0 0 1) LinearFunction(coefficients=1 0)
          TransformAxis rotation2: coordinates=pelvis_list axis=(1 0 0) LinearFunction(coefficients=1 0)
          TransformAxis rotation3: coordinates=pelvis_rotation axis=(0 1 0) LinearFunction(coefficients=1 0)
          TransformAxis translation1: coordinates=pelvis_tx axis=(1 0 0) LinearFunction(coefficients=1 0)
          TransformAxis translation2: coordinates=pelvis_ty axis=(0 1 0) LinearFunction(coefficients=1 0)
          TransformAxis translation3: coordinates=pelvis_tz axis=(0 0 1) LinearFunction(coefficients=1 0)
    Body femur_r: mass=11.01312 mass_center=(0 -0.181125 0) inertia_xx=0.1799714 inertia_yy=0.04717697
        inertia_zz=0.1897832 meshes=femur_r.vtp
      CustomJoint hip_r: parent_body=pelvis location_in_parent=(-0.08148157 -0.07618008 0.08947589) location=(0 0 0)
        Coordinate hip_flexion_r: motion_type=rotational default_value=0 range=(-2.094395 2.094395) clamped=true
        Coordinate hip_adduction_r: motion_type=rotational default_value=0 range=(-2.094395 2.094395) clamped=true
        Coordinate hip_rotation_r: motion_type=rotational default_value=0 range=(-2.094395 2.094395) clamped=true
        SpatialTransform: axes_held_at_zero=(translation1 translation2 translation3)
          TransformAxis rotation1: coordinates=hip_flexion_r axis=(0 0 1) LinearFunction(coefficients=1 0)
          TransformAxis rotation2: coordinates=hip_adduction_r axis=(1 0 0) LinearFunction(coefficients=1 0)
          TransformAxis rotation3: coordinates=hip_rotation_r axis=(0 1 0) LinearFunction(coefficients=1 0)
    Body tibia_r: mass=4.389784 mass_center=(0 -0.214146 0) inertia_xx=0.07850945 inertia_yy=0.007944409
        inertia_zz=0.07959986 meshes=(tibia_r.vtp fibula_r.vtp)
      CustomJoint knee_r: parent_body=femur_r location_in_parent=(0 -0.4304392 0) location=(0 -0.02867508 0)
        Coordinate knee_angle_r: motion_type=rotational default_value=0 range=(-2.094395 0.1745329) clamped=true
        SpatialTransform: axes_held_at_zero=(rotation2 rotation3 translation3)
          TransformAxis rotation1: coordinates=knee_angle_r axis=(0 0 1) LinearFunction(coefficients=1 0)
          TransformAxis translation1: coordinates=knee_angle_r axis=(1 0 0)
            MultiplierFunction: scale=1.065444
              SimmSpline: x=(-2.0944 -1.74533 -1.39626 -1.0472 -0.698132 -0.349066 -0.174533 0 0.197344 0.337395 0.490178 1.52146 2.0944)
                  y=(-0.0248506 -0.0228302 -0.0205102 -0.0175507 -0.0139497 -0.00955051 -0.00744121 -0.00525 -0.00032536 0.00284075 0.00619557 0.0195346 0.0164006)
          TransformAxis translation2: coordinates=knee_angle_r axis=(0 1 0)
            MultiplierFunction: scale=1.065444
              SimmSpline: x=(-2.0944 -1.22173 -0.523599 -0.349066 -0.174533 0 0.159149 2.0944)
                  y=(-0.00609989 -0.0127505 -0.0166506 -0.0170923 -0.0172202 -0.017 -0.0159841 0.0205001)
    Body patella_r: mass=0.1184028 mass_center=(0 0 0) inertia_xx=0.001344073 inertia_yy=0.001344073
        inertia_zz=0.001344073 meshes=pat.vtp
      CustomJoint pat_fem_r: parent_body=femur_r location_in_parent=(0 -0.4304392 0) location=(0 0 0)
        Coordinate patella_r_constrained_knee_angle: motion_type=rotational default_value=0 range=(-3.14 3.14)
            clamped=true is_free_to_satisfy_constraints=true
        SpatialTransform: axes_held_at_zero=(rotation2 rotation3)
          TransformAxis rotation1: coordinates=patella_r_constrained_knee_angle axis=(0 0 1)
            SimmSpline: x=(-2.0944 -1.45752 -0.526391 0 0.0523599 0.174533)
                y=(-1.68636 -1.09112 -0.256161 -0.0012 -0.0187016 -0.1054)
          TransformAxis translation1: coordinates=patella_r_constrained_knee_angle axis=(1 0 0)
            MultiplierFunction: scale=1.065444
              SimmSpline: x=(-2.0944 -1.91986 -1.5708 -1.39626 -1.0472 -0.698132 -0.349066 -0.174533 0 0.0872665 0.174533 2.0944)
                  y=(-0.03082 -0.02767 -0.01694 -0.00996 0.00548 0.0215 0.03599 0.04069 0.0451 0.04648 0.04761 0.04648)
          TransformAxis translation2: coordinates=patella_r_constrained_knee_angle axis=(0 1 0)
            MultiplierFunction: scale=1.065444
              SimmSpline: x=(-2.0944 -1.91986 -1.5708 -1.39626 -1.0472 -0.698132 -0.349066 -0.174533 0 0.0872665 0.174533 2.0944)
                  y=(-0.02263 -0.02892 -0.03914 -0.04244 -0.04469 -0.04063 -0.02973 -0.02297 -0.01452 -0.00979 -0.00496 -0.00979)
          TransformAxis translation3: axis=(0 0 1) MultiplierFunction(scale=1.065444, Constant(value=0.0024))
    Body talus_r: mass=0.1184028 mass_center=(0 0 0) inertia_xx=0.001737371 inertia_yy=0.001737371
        inertia_zz=0.001737371 meshes=talus_rv.vtp
      CustomJoint ankle_r: parent_body=tibia_r location_in_parent=(0 -0.4932115 0) location=(0 0 0)
        Coordinate ankle_angle_r: motion_type=rotational default_value=0 range=(-1.570796 1.570796) clamped=true
        SpatialTransform: axes_held_at_zero=(rotation2 rotation3 translation1 translation2 translation3)
          TransformAxis rotation1: coordinates=ankle_angle_r axis=(-0.1050135 -0.1740224 0.9791263)
              LinearFunction(coefficients=1 0)
    Body calcn_r: mass=1.480035 mass_center=(0.121134 0.0363401 0) inertia_xx=0.002432319 inertia_yy=0.006775747
        inertia_zz=0.007123221 meshes=foot.vtp
      CustomJoint subtalar_r: parent_body=talus_r location_in_parent=(-0.05907695 -0.05081562 0.009593796)
          location=(0 0 0)
        Coordinate subtalar_angle_r: motion_type=rotational default_value=0 range=(-1.570796 1.570796) clamped=true
            locked=true
        SpatialTransform: axes_held_at_zero=(rotation2 rotation3 translation1 translation2 translation3)
          TransformAxis rotation1: coordinates=subtalar_angle_r axis=(0.7871796 0.6047475 -0.1209495)
              LinearFunction(coefficients=1 0)
    Body toes_r: mass=0.2564605 mass_center=(0.0419123 0.00726803 -0.0211984) inertia_xx=0.0001737371
        inertia_yy=0.0003474742 inertia_zz=0.001737371 meshes=bofoot.vtp
      CustomJoint mtp_r: parent_body=calcn_r location_in_parent=(0.2165872 -0.002422676 0.001308245) location=(0 0 0)
        Coordinate mtp_angle_r: motion_type=rotational default_value=0 range=(-1.570796 1.570796) clamped=true
            locked=true
        SpatialTransform: axes_held_at_zero=(rotation2 rotation3 translation1 translation2 translation3)
          TransformAxis rotation1: coordinates=mtp_angle_r axis=(-0.5809544 0 0.8139361)
              LinearFunction(coefficients=1 0)
    Body femur_l: mass=11.01312 mass_center=(0 -0.181125 0) inertia_xx=0.1799714 inertia_yy=0.04717697
        inertia_zz=0.1897832 meshes=l_femur.vtp
      CustomJoint hip_l: parent_body=pelvis location_in_parent=(-0.08148157 -0.07618008 -0.08947589) location=(0 0 0)
        Coordinate hip_flexion_l: motion_type=rotational default_value=0 range=(-2.094395 2.094395) clamped=true
        Coordinate hip_adduction_l: motion_type=rotational default_value=0 range=(-2.094395 2.094395) clamped=true
        Coordinate hip_rotation_l: motion_type=rotational default_value=0 range=(-2.094395 2.094395) clamped=true
        SpatialTransform: axes_held_at_zero=(translation1 translation2 translation3)
          TransformAxis rotation1: coordinates=hip_flexion_l axis=(0 0 1) LinearFunction(coefficients=1 0)
          TransformAxis rotation2: coordinates=hip_adduction_l axis=(-1 0 0) LinearFunction(coefficients=1 0)
          TransformAxis rotation3: coordinates=hip_rotation_l axis=(0 -1 0) LinearFunction(coefficients=1 0)
    Body tibia_l: mass=4.389784 mass_center=(0 -0.214146 0) inertia_xx=0.07850945 inertia_yy=0.007944409
        inertia_zz=0.07959986 meshes=(l_tibia.vtp l_fibula.vtp)
      CustomJoint knee_l: parent_body=femur_l location_in_parent=(0 -0.4304392 0) location=(0 -0.02867508 0)
        Coordinate knee_angle_l: motion_type=rotational default_value=0 range=(-2.094395 0.1745329) clamped=true
        SpatialTransform: axes_held_at_zero=(rotation2 rotation3 translation3)
          TransformAxis rotation1: coordinates=knee_angle_l axis=(0 0 1) LinearFunction(coefficients=1 0)
          TransformAxis translation1: coordinates=knee_angle_l axis=(1 0 0)
            MultiplierFunction: scale=1.065444
              SimmSpline: x=(-2.0944 -1.74533 -1.39626 -1.0472 -0.698132 -0.349066 -0.174533 0 0.197344 0.337395 0.490178 1.52146 2.0944)
                  y=(-0.0248506 -0.0228302 -0.0205102 -0.0175507 -0.0139497 -0.00955051 -0.00744121 -0.00525 -0.00032536 0.00284075 0.00619557 0.0195346 0.0164006)
          TransformAxis translation2: coordinates=knee_angle_l axis=(0 1 0)
            MultiplierFunction: scale=1.065444
              SimmSpline: x=(-2.0944 -1.22173 -0.523599 -0.349066 -0.174533 0 0.159149 2.0944)
                  y=(-0.00609989 -0.0127505 -0.0166506 -0.0170923 -0.0172202 -0.017 -0.0159841 0.0205001)
    Body patella_l: mass=0.1184028 mass_center=(0 0 0) inertia_xx=0.001344073 inertia_yy=0.001344073
        inertia_zz=0.001344073 meshes=l_patella.vtp
      CustomJoint pat_fem_l: parent_body=femur_l location_in_parent=(0 -0.4304392 0) location=(0 0 0)
        Coordinate patella_l_constrained_knee_angle: motion_type=rotational default_value=0 range=(-3.14 3.14)
            clamped=true is_free_to_satisfy_constraints=true
        SpatialTransform: axes_held_at_zero=(rotation2 rotation3 translation3)
          TransformAxis rotation1: coordinates=patella_l_constrained_knee_angle axis=(0 0 1)
            SimmSpline: x=(-2.0944 -1.45752 -0.526391 0 0.0523599 0.174533)
                y=(-1.68636 -1.09112 -0.256161 -0.0012 -0.0187016 -0.1054)
          TransformAxis translation1: coordinates=patella_l_constrained_knee_angle axis=(1 0 0)
            MultiplierFunction: scale=1.065444
              SimmSpline: x=(-2.0944 -1.91986 -1.5708 -1.39626 -1.0472 -0.698132 -0.349066 -0.174533 0 0.0872665 0.174533 2.0944)
                  y=(-0.03082 -0.02767 -0.01694 -0.00996 0.00548 0.0215 0.03599 0.04069 0.0451 0.04648 0.04761 0.04648)
          TransformAxis translation2: coordinates=patella_l_constrained_knee_angle axis=(0 1 0)
            MultiplierFunction: scale=1.065444
              SimmSpline: x=(-2.0944 -1.91986 -1.5708 -1.39626 -1.0472 -0.698132 -0.349066 -0.174533 0 0.0872665 0.174533 2.0944)
                  y=(-0.02263 -0.02892 -0.03914 -0.04244 -0.04469 -0.04063 -0.02973 -0.02297 -0.01452 -0.00979 -0.00496 -0.00979)
    Body talus_l: mass=0.1184028 mass_center=(0 0 0) inertia_xx=0.001737371 inertia_yy=0.001737371
        inertia_zz=0.001737371 meshes=talus_lv.vtp
      CustomJoint ankle_l: parent_body=tibia_l location_in_parent=(0 -0.4932115 0) location=(0 0 0)
        Coordinate ankle_angle_l: motion_type=rotational default_value=0 range=(-1.047198 1.047198) clamped=true
        SpatialTransform: axes_held_at_zero=(rotation2 rotation3 translation1 translation2 translation3)
          TransformAxis rotation1: coordinates=ankle_angle_l axis=(0.1050135 0.1740224 0.9791263)
              LinearFunction(coefficients=1 0)
    Body calcn_l: mass=1.480035 mass_center=(0.121134 0.0363401 0) inertia_xx=0.002432319 inertia_yy=0.006775747
        inertia_zz=0.007123221 meshes=l_foot.vtp
      CustomJoint subtalar_l: parent_body=talus_l location_in_parent=(-0.05907695 -0.05081562 -0.009593796)
          location=(0 0 0)
        Coordinate subtalar_angle_l: motion_type=rotational default_value=0 range=(-1.570796 1.570796) clamped=true
            locked=true
        SpatialTransform: axes_held_at_zero=(rotation2 rotation3 translation1 translation2 translation3)
          TransformAxis rotation1: coordinates=subtalar_angle_l axis=(-0.7871796 -0.6047475 -0.1209495)
              LinearFunction(coefficients=1 0)
    Body toes_l: mass=0.2564605 mass_center=(0.0419123 0.00726803 0.0211984) inertia_xx=0.0001737371
        inertia_yy=0.0003474742 inertia_zz=0.001737371 meshes=l_bofoot.vtp
      CustomJoint mtp_l: parent_body=calcn_l location_in_parent=(0.2165872 -0.002422676 -0.001308245) location=(0 0 0)
        Coordinate mtp_angle_l: motion_type=rotational default_value=0 range=(-1.047198 1.047198) clamped=true
            locked=true
        SpatialTransform: axes_held_at_zero=(rotation2 rotation3 translation1 translation2 translation3)
          TransformAxis rotation1: coordinates=mtp_angle_l axis=(0.5809544 0 0.8139361)
              LinearFunction(coefficients=1 0)
    Body torso: mass=31.76345 mass_center=(-0.0103683 0.350328 0.0263737) inertia_xx=2.220113 inertia_yy=1.327433
        inertia_zz=2.220113 meshes=(hat_spine.vtp hat_ribs_scap.vtp hat_jaw.vtp hat_skull.vtp)
      CustomJoint back: parent_body=pelvis location_in_parent=(-0.1160565 0.09392855 0) location=(0 0 0)
        Coordinate lumbar_extension: motion_type=rotational default_value=0 range=(-1.570796 1.570796) clamped=true
        Coordinate lumbar_bending: motion_type=rotational default_value=0 range=(-1.570796 1.570796) clamped=true
        Coordinate lumbar_rotation: motion_type=rotational default_value=0 range=(-1.570796 1.570796) clamped=true
        SpatialTransform: axes_held_at_zero=(translation1 translation2 translation3)
          TransformAxis rotation1: coordinates=lumbar_extension axis=(0 0 1) LinearFunction(coefficients=1 0)
          TransformAxis rotation2: coordinates=lumbar_bending axis=(1 0 0) LinearFunction(coefficients=1 0)
          TransformAxis rotation3: coordinates=lumbar_rotation axis=(0 1 0) LinearFunction(coefficients=1 0)
    Body humerus_r: mass=2.406537 mass_center=(0 -0.200392 0) inertia_xx=0.02098943 inertia_yy=0.007240705
        inertia_zz=0.02355996 meshes=humerus_rv.vtp
      CustomJoint acromial_r: parent_body=torso location_in_parent=(0.003843328 0.4067092 0.207089) location=(0 0 0)
        Coordinate arm_flex_r: motion_type=rotational default_value=0 range=(-1.570796 1.570796) clamped=true
        Coordinate arm_add_r: motion_type=rotational default_value=0 range=(-2.094395 1.570796) clamped=true
        Coordinate arm_rot_r: motion_type=rotational default_value=0 range=(-3.14159 1.570796) clamped=true
        SpatialTransform: axes_held_at_zero=(translation1 translation2 translation3)
          TransformAxis rotation1: coordinates=arm_flex_r axis=(0 0 1) LinearFunction(coefficients=1 0)
          TransformAxis rotation2: coordinates=arm_add_r axis=(1 0 0) LinearFunction(coefficients=1 0)
          TransformAxis rotation3: coordinates=arm_rot_r axis=(0 1 0) LinearFunction(coefficients=1 0)
    Body ulna_r: mass=0.719297 mass_center=(0 -0.14682 0) inertia_xx=0.005204312 inertia_yy=0.001085842
        inertia_zz=0.005645325 meshes=ulna_rv.vtp
      CustomJoint elbow_r: parent_body=humerus_r location_in_parent=(0.01601163 -0.3487294 -0.01168835)
          location=(0 0 0)
        Coordinate elbow_flex_r: motion_type=rotational default_value=0 range=(0 2.618) clamped=true
        SpatialTransform: axes_held_at_zero=(rotation2 rotation3 translation1 translation2 translation3)
          TransformAxis rotation1: coordinates=elbow_flex_r axis=(0.226047 0.022269 0.9738618)
              LinearFunction(coefficients=1 0)
    Body radius_r: mass=0.719297 mass_center=(0 -0.14682 0) inertia_xx=0.005204312 inertia_yy=0.001085842
        inertia_zz=0.005645325 meshes=radius_rv.vtp
      CustomJoint radioulnar_r: parent_body=ulna_r location_in_parent=(-0.008194634 -0.01584475 0.03177354)
          location=(0 0 0)
        Coordinate pro_sup_r: motion_type=rotational default_value=0 range=(0 1.570796) clamped=true
        SpatialTransform: axes_held_at_zero=(rotation2 rotation3 translation1 translation2 translation3)
          TransformAxis rotation1: coordinates=pro_sup_r axis=(0.05639803 0.9984065 0.001952)
              LinearFunction(coefficients=1 0)
    Body hand_r: mass=0.5416928 mass_center=(0 -0.0829513 0) inertia_xx=0.001567267 inertia_yy=0.0009610933
        inertia_zz=0.002354415
        meshes=(pisiform_rvs.vtp lunate_rvs.vtp scaphoid_rvs.vtp triquetrum_rvs.vtp hamate_rvs.vtp capitate_rvs.vtp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)
      CustomJoint radius_hand_r: parent_body=radius_r location_in_parent=(-0.01071625 -0.2872946 0.0165793)
          location=(0 0 0)
        Coordinate wrist_flex_r: motion_type=rotational default_value=0 range=(-1.22173 1.22173) clamped=true
            locked=true
        Coordinate wrist_dev_r: motion_type=rotational default_value=0 range=(-0.4363323 0.6108652) clamped=true
            locked=true
        SpatialTransform: axes_held_at_zero=(rotation3 translation1 translation2 translation3)
          TransformAxis rotation1: coordinates=wrist_flex_r axis=(0 0 1) LinearFunction(coefficients=1 0)
          TransformAxis rotation2: coordinates=wrist_dev_r axis=(1 0 0) LinearFunction(coefficients=1 0)
    Body humerus_l: mass=2.406537 mass_center=(0 -0.200392 0) inertia_xx=0.02098943 inertia_yy=0.007240705
        inertia_zz=0.02355996 meshes=humerus_lv.vtp
      CustomJoint acromial_l: parent_body=torso location_in_parent=(0.003843328 0.4067092 -0.207089) location=(0 0 0)
        Coordinate arm_flex_l: motion_type=rotational default_value=0 range=(-1.570796 1.570796) clamped=true
        Coordinate arm_add_l: motion_type=rotational default_value=0 range=(-2.094395 1.570796) clamped=true
        Coordinate arm_rot_l: motion_type=rotational default_value=0 range=(-3.14159 1.570796) clamped=true
        SpatialTransform: axes_held_at_zero=(translation1 translation2 translation3)
          TransformAxis rotation1: coordinates=arm_flex_l axis=(0 0 1) LinearFunction(coefficients=1 0)
          TransformAxis rotation2: coordinates=arm_add_l axis=(-1 0 0) LinearFunction(coefficients=1 0)
          TransformAxis rotation3: coordinates=arm_rot_l axis=(0 -1 0) LinearFunction(coefficients=1 0)
    Body ulna_l: mass=0.719297 mass_center=(0 -0.14682 0) inertia_xx=0.005204312 inertia_yy=0.001085842
        inertia_zz=0.005645325 meshes=ulna_lv.vtp
      CustomJoint elbow_l: parent_body=humerus_l location_in_parent=(0.01601163 -0.3487294 0.01168835) location=(0 0 0)
        Coordinate elbow_flex_l: motion_type=rotational default_value=0 range=(0 2.618) clamped=true
        SpatialTransform: axes_held_at_zero=(rotation2 rotation3 translation1 translation2 translation3)
          TransformAxis rotation1: coordinates=elbow_flex_l axis=(-0.226047 -0.022269 0.9738618)
              LinearFunction(coefficients=1 0)
    Body radius_l: mass=0.719297 mass_center=(0 -0.14682 0) inertia_xx=0.005204312 inertia_yy=0.001085842
        inertia_zz=0.005645325 meshes=radius_lv.vtp
      CustomJoint radioulnar_l: parent_body=ulna_l location_in_parent=(-0.008194634 -0.01584475 -0.03177354)
          location=(0 0 0)
        Coordinate pro_sup_l: motion_type=rotational default_value=0 range=(0 1.570796) clamped=true
        SpatialTransform: axes_held_at_zero=(rotation2 rotation3 translation1 translation2 translation3)
          TransformAxis rotation1: coordinates=pro_sup_l axis=(-0.05639803 -0.9984065 0.001952)
              LinearFunction(coefficients=1 0)
    Body hand_l: mass=0.5416928 mass_center=(0 -0.0829513 0) inertia_xx=0.001567267 inertia_yy=0.0009610933
        inertia_zz=0.002354415
        meshes=(pisiform_lvs.vtp lunate_lvs.vtp scaphoid_lvs.vtp triquetrum_lvs.vtp hamate_lvs.vtp capitate_lvs.vtp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)
      CustomJoint radius_hand_l: parent_body=radius_l location_in_parent=(-0.01071625 -0.2872946 -0.0165793)
          location=(0 0 0)
        Coordinate wrist_flex_l: motion_type=rotational default_value=0 range=(-1.22173 1.22173) clamped=true
            locked=true
        Coordinate wrist_dev_l: motion_type=rotational default_value=0 range=(-0.4363323 0.6108652) clamped=true
            locked=true
        SpatialTransform: axes_held_at_zero=(rotation3 translation1 translation2 translation3)
          TransformAxis rotation1: coordinates=wrist_flex_l axis=(0 0 1) LinearFunction(coefficients=1 0)
          TransformAxis rotation2: coordinates=wrist_dev_l axis=(-1 0 0) LinearFunction(coefficients=1 0)
    Body backpack: mass=37.59236 mass_center=(-0.00685433 0 0.00509307) inertia_xx=0.8743293 inertia_yy=0.7429599
        inertia_zz=0.8743293 meshes=backpack0.vtp
      WeldJoint duct_tape: parent_body=torso location_in_parent=(0 0.23 0) location=(0 0 0)
  ConstraintSet:
    CoordinateCouplerConstraint patalla_r_coupler: independent_coordinate_names=knee_angle_r
        dependent_coordinate_name=patella_r_constrained_knee_angle scale_factor=1
      coupled_coordinates_function: SimmSpline: x=(-2.0944 -1.45752 -0.526391 0 0.0523599 0.174533)
          y=(-2.0944 -1.45752 -0.526391 0 0.0523599 0.174533)
    CoordinateCouplerConstraint patella_l_coupler: independent_coordinate_names=knee_angle_l
        dependent_coordinate_name=patella_l_constrained_knee_angle scale_factor=1
      coupled_coordinates_function: SimmSpline: x=(-2.0944 -1.99997 -1.45752 -0.526391 0.0279253 0.174533)
          y=(-2.0944 -1.99997 -1.45752 -0.526391 0.0279253 0.174533)
  ForceSet:
    Thelen2003Muscle [values shared by the 92 below unless stated]: min_control=0.02 max_control=1 optimal_force=1
        max_contraction_velocity=10 default_activation=0.05 default_fiber_length=0.1 activation_time_constant=0.01
        deactivation_time_constant=0.04 FmaxTendonStrain=0.033 FmaxMuscleStrain=0.6 KshapeActive=0.5 KshapePassive=4
        Af=0.3 Flen=1.8
    Thelen2003Muscle glut_med1_r: max_isometric_force=1638 optimal_fiber_length=0.06078834
        tendon_slack_length=0.08862599 pennation_angle_at_optimal=0.1396263
      PathPoint P1: pelvis (-0.0470219 0.0350359 0.129553)
      PathPoint P2: femur_r (-0.0232267 -0.0124657 0.0591321)
    Thelen2003Muscle glut_med2_r: max_isometric_force=1146 optimal_fiber_length=0.09552139
        tendon_slack_length=0.05991282 pennation_angle_at_optimal=0
      PathPoint P1: pelvis (-0.0985385 0.0512861 0.0820821)
      PathPoint P2: femur_r (-0.0274884 -0.00617957 0.0561489)
    Thelen2003Muscle glut_med3_r: max_isometric_force=1306 optimal_fiber_length=0.07236032
        tendon_slack_length=0.05936683 pennation_angle_at_optimal=0.3316126
      PathPoint P1: pelvis (-0.14095 0.0121012 0.0694376)
      PathPoint P2: femur_r (-0.0329222 -0.00500759 0.05519)
    Thelen2003Muscle glut_min1_r: max_isometric_force=540 optimal_fiber_length=0.07653691
        tendon_slack_length=0.01800869 pennation_angle_at_optimal=0.1745329
      PathPoint P1: pelvis (-0.0538216 -0.00921998 0.113158)
      PathPoint P2: femur_r (-0.00767119 -0.0110806 0.0596648)
    Thelen2003Muscle glut_min2_r: max_isometric_force=570 optimal_fiber_length=0.0627313 tendon_slack_length=0.02912525
        pennation_angle_at_optimal=0
      PathPoint P1: pelvis (-0.0729531 -0.00749123 0.106192)
      PathPoint P2: femur_r (-0.0102283 -0.0110806 0.0596648)
    Thelen2003Muscle glut_min3_r: max_isometric_force=646 optimal_fiber_length=0.04231693
        tendon_slack_length=0.05679378 pennation_angle_at_optimal=0.01745329
      PathPoint P1: pelvis (-0.0961183 -0.00726073 0.0917262)
      PathPoint P2: femur_r (-0.0143835 -0.00884318 0.0585994)
    Thelen2003Muscle semimem_r: max_isometric_force=2576 optimal_fiber_length=0.08511299 tendon_slack_length=0.3819445
        pennation_angle_at_optimal=0.2617994
      PathPoint P1: pelvis (-0.137378 -0.112334 0.0766278)
      ConditionalPathPoint P2: tibia_r (-0.0399157 -0.040363 -0.0216898) range=(-0.558505 0.174533)
          coordinate=knee_angle_r
      PathPoint P3: tibia_r (-0.0309691 -0.0547235 -0.0224469)
    Thelen2003Muscle semiten_r: max_isometric_force=820 optimal_fiber_length=0.2155624 tendon_slack_length=0.2740109
        pennation_angle_at_optimal=0.08726646
      PathPoint P1: pelvis (-0.145618 -0.126636 0.064712)
      ConditionalPathPoint P2: tibia_r (-0.0482086 -0.0327928 -0.0261173) range=(-0.331613 0.174533)
          coordinate=knee_angle_r
      PathPoint P3: tibia_r (-0.0381035 -0.0605847 -0.0262434)
      PathPoint P4: tibia_r (-0.0129611 -0.0855665 -0.0281016)
      PathPoint P5: tibia_r (0.00309691 -0.109654 -0.0221372)
    Thelen2003Muscle bifemlh_r: max_isometric_force=1792 optimal_fiber_length=0.1161157 tendon_slack_length=0.3472819
        pennation_angle_at_optimal=0
      PathPoint P1: pelvis (-0.145169 -0.118212 0.0744096)
      PathPoint P2: tibia_r (-0.0345248 -0.0412921 0.0337563)
      PathPoint P3: tibia_r (-0.0268399 -0.0645763 0.0393422)
    Thelen2003Muscle bifemsh_r: max_isometric_force=1608 optimal_fiber_length=0.1865656 tendon_slack_length=0.09597884
        pennation_angle_at_optimal=0.4014257
      PathPoint P1: femur_r (0.00532722 -0.224915 0.0249314)
      PathPoint P2: tibia_r (-0.0345248 -0.0412921 0.0337563)
      PathPoint P3: tibia_r (-0.0268399 -0.0645763 0.0393422)
    Thelen2003Muscle sar_r: max_isometric_force=312 optimal_fiber_length=0.5650092 tendon_slack_length=0.1086556
        pennation_angle_at_optimal=0
      PathPoint P1: pelvis (-0.0176332 -0.00149825 0.133089)
      PathPoint P2: femur_r (-0.00319633 -0.38015 -0.0448552)
      PathPoint P3: tibia_r (-0.00642322 -0.0480594 -0.0457654)
      PathPoint P4: tibia_r (0.00688202 -0.0675585 -0.0439302)
      PathPoint P5: tibia_r (0.0278722 -0.0963483 -0.0289045)
    Thelen2003Muscle add_long_r: max_isometric_force=1254 optimal_fiber_length=0.1466305 tendon_slack_length=0.1168794
        pennation_angle_at_optimal=0.1047198
      PathPoint P1: pelvis (-0.0364189 -0.0963488 0.0181095)
      PathPoint P2: femur_r (0.00532722 -0.224915 0.0249314)
    Thelen2003Muscle add_brev_r: max_isometric_force=858 optimal_fiber_length=0.1405797 tendon_slack_length=0.02113981
        pennation_angle_at_optimal=0
      PathPoint P1: pelvis (-0.0676516 -0.105454 0.0175737)
      PathPoint P2: femur_r (0.000958899 -0.127427 0.031324)
    Thelen2003Muscle add_mag1_r: max_isometric_force=762 optimal_fiber_length=0.09091274 tendon_slack_length=0.06269844
        pennation_angle_at_optimal=0.08726646
      PathPoint P1: pelvis (-0.0843628 -0.135303 0.027325)
      PathPoint P2: femur_r (-0.0047945 -0.129025 0.0361185)
    Thelen2003Muscle add_mag2_r: max_isometric_force=686 optimal_fiber_length=0.1264041 tendon_slack_length=0.1253595
        pennation_angle_at_optimal=0.05235988
      PathPoint P1: pelvis (-0.0957725 -0.137378 0.0330043)
      PathPoint P2: femur_r (0.0057534 -0.243454 0.0241856)
    Thelen2003Muscle add_mag3_r: max_isometric_force=976 optimal_fiber_length=0.1381748 tendon_slack_length=0.2626376
        pennation_angle_at_optimal=0.08726646
      PathPoint P1: pelvis (-0.128019 -0.131535 0.0523139)
      PathPoint P2: femur_r (0.00745811 -0.408811 -0.0283408)
    Thelen2003Muscle tfl_r: max_isometric_force=466 optimal_fiber_length=0.1028692 tendon_slack_length=0.4602045
        pennation_angle_at_optimal=0.05235988
      PathPoint P1: pelvis (-0.0358427 0.0246634 0.132982)
      PathPoint P2: femur_r (0.031324 -0.106012 0.063607)
      PathPoint P3: femur_r (0.0057534 -0.431398 0.0380363)
      PathPoint P4: tibia_r (0.00688202 -0.0558591 0.034066)
    Thelen2003Muscle pect_r: max_isometric_force=532 optimal_fiber_length=0.1069819 tendon_slack_length=0.03530402
        pennation_angle_at_optimal=0
      PathPoint P1: pelvis (-0.0496726 -0.0885118 0.0483277)
      PathPoint P2: femur_r (-0.0129984 -0.0875795 0.0269557)
    Thelen2003Muscle grac_r: max_isometric_force=324 optimal_fiber_length=0.3760266 tendon_slack_length=0.1346004
        pennation_angle_at_optimal=0.05235988
      PathPoint P1: pelvis (-0.0852963 -0.136801 0.0299396)
      ConditionalPathPoint P2: tibia_r (-0.0304759 -0.0365894 -0.0432879) range=(-0.436332 0.174533)
          coordinate=knee_angle_r
      PathPoint P3: tibia_r (-0.0222863 -0.0591051 -0.0410627)
      PathPoint P4: tibia_r (0.00688202 -0.0958895 -0.0261517)
    Thelen2003Muscle glut_max1_r: max_isometric_force=1146 optimal_fiber_length=0.1593178 tendon_slack_length=0.1402445
        pennation_angle_at_optimal=0.08726646
      PathPoint P1: pelvis (-0.137723 0.0705328 0.0750097)
      PathPoint P2: pelvis (-0.148787 0.001383 0.0949409)
      PathPoint P3: femur_r (-0.0486908 -0.026423 0.0417654)
      PathPoint P4: femur_r (-0.0295128 -0.0603041 0.0500759)
    Thelen2003Muscle glut_max2_r: max_isometric_force=1638 optimal_fiber_length=0.1627242 tendon_slack_length=0.1405849
        pennation_angle_at_optimal=0
      PathPoint P1: pelvis (-0.155472 0.020284 0.0603293)
      PathPoint P2: pelvis (-0.158584 -0.0599299 0.0979413)
      PathPoint P3: femur_r (-0.0453879 -0.0564685 0.0312175)
      PathPoint P4: femur_r (-0.0166209 -0.108249 0.0446421)
    Thelen2003Muscle glut_max3_r: max_isometric_force=1104 optimal_fiber_length=0.1582593 tendon_slack_length=0.1593583
        pennation_angle_at_optimal=0.08726646
      PathPoint P1: pelvis (-0.179329 -0.0361884 0.00621509)
      PathPoint P2: pelvis (-0.176217 -0.121243 0.0431842)
      PathPoint P3: femur_r (-0.0318568 -0.110913 0.0143835)
      PathPoint P4: femur_r (-0.00639266 -0.151186 0.0437897)
    Thelen2003Muscle iliacus_r: max_isometric_force=2146 optimal_fiber_length=0.1127129 tendon_slack_length=0.1127129
        pennation_angle_at_optimal=0.1221731
      PathPoint P1: pelvis (-0.0776783 0.0420662 0.0915119)
      PathPoint P2: pelvis (-0.0297344 -0.0633874 0.0869041)
      ConditionalPathPoint P3: pelvis (-0.0331919 -0.092776 0.0874399) range=(-1.5708 0.785398)
          coordinate=hip_flexion_r
      PathPoint P4: femur_r (0.00181125 -0.0578536 0.00607303)
      PathPoint P5: femur_r (-0.0205631 -0.0661641 0.0137442)
    Thelen2003Muscle psoas_r: max_isometric_force=2226 optimal_fiber_length=0.1129468 tendon_slack_length=0.1807149
        pennation_angle_at_optimal=0.1396263
      PathPoint P1: pelvis (-0.0745666 0.102227 0.0309683)
      PathPoint P2: pelvis (-0.0274294 -0.0656924 0.081332)
      ConditionalPathPoint P3: pelvis (-0.0331919 -0.092776 0.0874399) range=(-1.5708 0.785398)
          coordinate=hip_flexion_r
      PathPoint P4: femur_r (0.00170471 -0.054018 0.00404869)
      PathPoint P5: femur_r (-0.0200303 -0.063607 0.0110806)
    Thelen2003Muscle quad_fem_r: max_isometric_force=762 optimal_fiber_length=0.05869617 tendon_slack_length=0.02608719
        pennation_angle_at_optimal=0
      PathPoint P1: pelvis (-0.13173 -0.132652 0.0557215)
      PathPoint P2: femur_r (-0.0405934 -0.0382494 0.0389952)
    Thelen2003Muscle gem_r: max_isometric_force=328 optimal_fiber_length=0.02633653 tendon_slack_length=0.04279686
        pennation_angle_at_optimal=0
      PathPoint P1: pelvis (-0.130578 -0.0945048 0.0765099)
      PathPoint P2: femur_r (-0.0151293 -0.00351596 0.0471992)
    Thelen2003Muscle peri_r: max_isometric_force=888 optimal_fiber_length=0.02880462 tendon_slack_length=0.127405
        pennation_angle_at_optimal=0.1745329
      PathPoint P1: pelvis (-0.160889 0.000345749 0.0251818)
      PathPoint P2: pelvis (-0.137493 -0.0318089 0.070402)
      PathPoint P3: femur_r (-0.0157686 -0.0038356 0.0465599)
    Thelen2003Muscle rect_fem_r: max_isometric_force=2338 optimal_fiber_length=0.1227323 tendon_slack_length=0.4327929
        pennation_angle_at_optimal=0.08726646
      PathPoint P1: pelvis (-0.0339987 -0.0358427 0.103728)
      ConditionalPathPoint P2: femur_r (0.0355858 -0.429374 0.00202434) range=(-2.61799 -1.45997)
          coordinate=knee_angle_r
      PathPoint P3: patella_r (0.0128919 0.0465599 -0.00106544)
      PathPoint P4: patella_r (0.00532722 0.00263678 3.67472e-5)
      PathPoint P5: tibia_r (0.043462 -0.0819171 0.000760452)
    Thelen2003Muscle vas_med_r: max_isometric_force=2588 optimal_fiber_length=0.0957278 tendon_slack_length=0.2366305
        pennation_angle_at_optimal=0.08726646
      PathPoint P1: femur_r (0.0149162 -0.223637 0.0200303)
      PathPoint P2: femur_r (0.0379298 -0.295021 0.000958899)
      ConditionalPathPoint P3: femur_r (0.0394214 -0.431292 -0.013318) range=(-2.61799 -1.21004)
          coordinate=knee_angle_r
      ConditionalPathPoint P4: femur_r (0.0291932 -0.453346 -0.0139573) range=(-2.61799 -1.78006)
          coordinate=knee_angle_r
      PathPoint P5: patella_r (0.00671229 0.0474122 -0.0181125)
      PathPoint P6: patella_r (0.00532722 0.00263165 -0.00905256)
      PathPoint P7: tibia_r (0.0426513 -0.0824346 -0.00648418)
    Thelen2003Muscle vas_int_r: max_isometric_force=2730 optimal_fiber_length=0.09353809 tendon_slack_length=0.2472846
        pennation_angle_at_optimal=0.05235988
      PathPoint P1: femur_r (0.0308979 -0.204991 0.0330288)
      PathPoint P2: femur_r (0.0356924 -0.222038 0.0303651)
      ConditionalPathPoint P3: femur_r (0.0365447 -0.429374 0.00585994) range=(-2.61799 -1.42) coordinate=knee_angle_r
      PathPoint P4: patella_r (0.00617957 0.0511413 -0.000639266)
      PathPoint P5: patella_r (0.00532722 0.00263165 -0.000419657)
      PathPoint P6: tibia_r (0.0434272 -0.0820144 0.000804107)
    Thelen2003Muscle vas_lat_r: max_isometric_force=3742 optimal_fiber_length=0.09027049 tendon_slack_length=0.2675875
        pennation_angle_at_optimal=0.08726646
      PathPoint P1: femur_r (0.00511413 -0.197533 0.037184)
      PathPoint P2: femur_r (0.0286604 -0.276056 0.0435766)
      ConditionalPathPoint P3: femur_r (0.0384625 -0.429374 0.0218416) range=(-2.61799 -1.21004)
          coordinate=knee_angle_r
      ConditionalPathPoint P4: femur_r (0.0269557 -0.452068 0.0196042) range=(-2.61799 -1.92004)
          coordinate=knee_angle_r
      PathPoint P5: patella_r (0.0109741 0.0450683 0.0150228)
      PathPoint P6: patella_r (0.00532722 0.00263165 0.0078098)
      PathPoint P7: tibia_r (0.0433911 -0.0822179 0.00715732)
    Thelen2003Muscle med_gas_r: max_isometric_force=416.765 optimal_fiber_length=0.06857708
        tendon_slack_length=0.445751 pennation_angle_at_optimal=0.296706
      PathPoint P1: femur_r (-0.0202434 -0.418613 -0.0250379)
      ConditionalPathPoint P2: femur_r (-0.0319633 -0.428521 -0.0274884) range=(-0.785398 0.174533)
          coordinate=knee_angle_r
      PathPoint P3: calcn_r (0 0.0375515 -0.00642009)
    Thelen2003Muscle lat_gas_r: max_isometric_force=182.7025 optimal_fiber_length=0.07318545
        tendon_slack_length=0.4345386 pennation_angle_at_optimal=0.1396263
      PathPoint P1: femur_r (-0.0234398 -0.420424 0.0289801)
      ConditionalPathPoint P2: femur_r (-0.0319633 -0.428095 0.0291932) range=(-0.785398 0.174533)
          coordinate=knee_angle_r
      PathPoint P3: calcn_r (0 0.0375515 -0.00642009)
    Thelen2003Muscle soleus_r: max_isometric_force=949.3575 optimal_fiber_length=0.05755701
        tendon_slack_length=0.287785 pennation_angle_at_optimal=0.4363323
      PathPoint P1: tibia_r (-0.00275281 -0.175836 0.00814372)
      PathPoint P2: calcn_r (0 0.0375515 -0.00642009)
    Thelen2003Muscle tib_post_r: max_isometric_force=424.79 optimal_fiber_length=0.03581978
        tendon_slack_length=0.3581978 pennation_angle_at_optimal=0.2094395
      PathPoint P1: tibia_r (-0.0107818 -0.154616 0.00217931)
      PathPoint P2: tibia_r (-0.0165168 -0.464651 -0.0262664)
      PathPoint P3: calcn_r (0.0505128 0.0404587 -0.0346443)
      PathPoint P4: calcn_r (0.0935153 0.0192603 -0.0340386)
    Thelen2003Muscle flex_dig_r: max_isometric_force=82.925 optimal_fiber_length=0.04002936
        tendon_slack_length=0.4709337 pennation_angle_at_optimal=0.1221731
      PathPoint P1: tibia_r (-0.00952013 -0.234677 -0.00206461)
      PathPoint P2: tibia_r (-0.0176639 -0.464651 -0.0224813)
      PathPoint P3: calcn_r (0.0528143 0.0381571 -0.0339175)
      PathPoint P4: calcn_r (0.0857627 0.0213195 -0.0318582)
      PathPoint P5: calcn_r (0.20084 -0.00981184 0.0140515)
      PathPoint P6: toes_r (-0.00230154 -0.00944844 0.0178067)
      PathPoint P7: toes_r (0.0345231 -0.0086005 0.0260438)
      PathPoint P8: toes_r (0.05342 -0.00726803 0.0293144)
    Thelen2003Muscle flex_hal_r: max_isometric_force=86.135 optimal_fiber_length=0.05073588
        tendon_slack_length=0.4483636 pennation_angle_at_optimal=0.1745329
      PathPoint P1: tibia_r (-0.00906133 -0.267711 0.0279869)
      PathPoint P2: tibia_r (-0.0213343 -0.467863 -0.0199579)
      PathPoint P3: calcn_r (0.045304 0.0334329 -0.0291932)
      PathPoint P4: calcn_r (0.125737 0.0082371 -0.0310102)
      PathPoint P5: calcn_r (0.209077 -0.00642009 -0.032585)
      PathPoint P6: toes_r (0.0187757 -0.00775256 -0.0321005)
      PathPoint P7: toes_r (0.0680772 -0.0123556 -0.0219252)
    Thelen2003Muscle tib_ant_r: max_isometric_force=1810 optimal_fiber_length=0.1136048 tendon_slack_length=0.2585088
        pennation_angle_at_optimal=0.08726646
      PathPoint P1: tibia_r (0.0205314 -0.186273 0.0131905)
      PathPoint P2: tibia_r (0.0377364 -0.453181 -0.020302)
      PathPoint P3: calcn_r (0.141242 0.0215618 -0.0369458)
    Thelen2003Muscle per_brev_r: max_isometric_force=116.3625 optimal_fiber_length=0.05794906
        tendon_slack_length=0.186596 pennation_angle_at_optimal=0.08726646
      PathPoint P1: tibia_r (-0.00802902 -0.303497 0.0372776)
      PathPoint P2: tibia_r (-0.0227107 -0.479906 0.0324602)
      PathPoint P3: tibia_r (-0.0165168 -0.492638 0.0331484)
      PathPoint P4: calcn_r (0.057054 0.0327061 0.0282242)
      PathPoint P5: calcn_r (0.0820076 0.0265283 0.0415489)
    Thelen2003Muscle per_long_r: max_isometric_force=252.2525 optimal_fiber_length=0.05711564
        tendon_slack_length=0.4021407 pennation_angle_at_optimal=0.1745329
      PathPoint P1: tibia_r (0.000573502 -0.17985 0.0415215)
      PathPoint P2: tibia_r (-0.023743 -0.482315 0.0328043)
      PathPoint P3: tibia_r (-0.0185815 -0.495391 0.0331484)
      PathPoint P4: calcn_r (0.0530566 0.0278608 0.0267706)
      PathPoint P5: calcn_r (0.0824921 0.0128402 0.034402)
      PathPoint P6: calcn_r (0.103206 0.00835823 0.0142938)
      PathPoint P7: calcn_r (0.145724 0.0102964 -0.0222886)
    Thelen2003Muscle per_tert_r: max_isometric_force=360 optimal_fiber_length=0.09187208 tendon_slack_length=0.1162938
        pennation_angle_at_optimal=0.2268928
      PathPoint P1: tibia_r (0.001147 -0.32162 0.0264958)
      PathPoint P2: tibia_r (0.0262664 -0.466716 0.0182374)
      PathPoint P3: calcn_r (0.103812 0.0276185 0.036219)
    Thelen2003Muscle ext_dig_r: max_isometric_force=1024 optimal_fiber_length=0.1194219 tendon_slack_length=0.403927
        pennation_angle_at_optimal=0.1396263
      PathPoint P1: tibia_r (0.00367041 -0.158401 0.0316573)
      PathPoint P2: tibia_r (0.0331484 -0.459604 0.00825842)
      PathPoint P3: calcn_r (0.111685 0.0469999 -0.000121134)
      PathPoint P4: calcn_r (0.195752 0.00666236 0.0157474)
      PathPoint P5: toes_r (0.000363401 0.00569329 0.0185335)
      PathPoint P6: toes_r (0.0536623 -0.000484535 0.0302834)
    Thelen2003Muscle ext_hal_r: max_isometric_force=324 optimal_fiber_length=0.1302957 tendon_slack_length=0.3580197
        pennation_angle_at_optimal=0.1047198
      PathPoint P1: tibia_r (0.0013764 -0.202676 0.0261517)
      PathPoint P2: tibia_r (0.0373923 -0.457081 -0.00974953)
      PathPoint P3: calcn_r (0.1175 0.047121 -0.0255592)
      PathPoint P4: calcn_r (0.156626 0.0374303 -0.0311314)
      PathPoint P5: calcn_r (0.210046 0.0168376 -0.0339175)
      PathPoint P6: toes_r (0.0360979 0.00496649 -0.0296778)
      PathPoint P7: toes_r (0.0681983 0.00411855 -0.0225309)
    Thelen2003Muscle glut_med1_l: max_isometric_force=1638 optimal_fiber_length=0.06078834
        tendon_slack_length=0.08862599 pennation_angle_at_optimal=0.1396263
      PathPoint P1: pelvis (-0.0470219 0.0350359 -0.129553)
      PathPoint P2: femur_l (-0.0232267 -0.0124657 -0.0591321)
    Thelen2003Muscle glut_med2_l: max_isometric_force=1146 optimal_fiber_length=0.09552139
        tendon_slack_length=0.05991282 pennation_angle_at_optimal=0
      PathPoint P1: pelvis (-0.0985385 0.0512861 -0.0820821)
      PathPoint P2: femur_l (-0.0274884 -0.00617957 -0.0561489)
    Thelen2003Muscle glut_med3_l: max_isometric_force=1306 optimal_fiber_length=0.07236032
        tendon_slack_length=0.05936683 pennation_angle_at_optimal=0.3316126
      PathPoint P1: pelvis (-0.14095 0.0121012 -0.0694376)
      PathPoint P2: femur_l (-0.0329222 -0.00500759 -0.05519)
    Thelen2003Muscle glut_min1_l: max_isometric_force=540 optimal_fiber_length=0.07653691
        tendon_slack_length=0.01800869 pennation_angle_at_optimal=0.1745329
      PathPoint P1: pelvis (-0.0538216 -0.00921998 -0.113158)
      PathPoint P2: femur_l (-0.00767119 -0.0110806 -0.0596648)
    Thelen2003Muscle glut_min2_l: max_isometric_force=570 optimal_fiber_length=0.0627313 tendon_slack_length=0.02912525
        pennation_angle_at_optimal=0
      PathPoint P1: pelvis (-0.0729531 -0.00749123 -0.106192)
      PathPoint P2: femur_l (-0.0102283 -0.0110806 -0.0596648)
    Thelen2003Muscle glut_min3_l: max_isometric_force=646 optimal_fiber_length=0.04231693
        tendon_slack_length=0.05679378 pennation_angle_at_optimal=0.01745329
      PathPoint P1: pelvis (-0.0961183 -0.00726073 -0.0917262)
      PathPoint P2: femur_l (-0.0143835 -0.00884318 -0.0585994)
    Thelen2003Muscle semimem_l: max_isometric_force=2576 optimal_fiber_length=0.08511299 tendon_slack_length=0.3819445
        pennation_angle_at_optimal=0.2617994
      PathPoint P1: pelvis (-0.137378 -0.112334 -0.0766278)
      ConditionalPathPoint P2: tibia_l (-0.0399157 -0.040363 0.0216898) range=(-0.558505 0.174533)
          coordinate=knee_angle_l
      PathPoint P3: tibia_l (-0.0309691 -0.0547235 0.0224469)
    Thelen2003Muscle semiten_l: max_isometric_force=820 optimal_fiber_length=0.2155624 tendon_slack_length=0.2740109
        pennation_angle_at_optimal=0.08726646
      PathPoint P1: pelvis (-0.145618 -0.126636 -0.064712)
      ConditionalPathPoint P2: tibia_l (-0.0482086 -0.0327928 0.0261173) range=(-0.331613 0.174533)
          coordinate=knee_angle_l
      PathPoint P3: tibia_l (-0.0381035 -0.0605847 0.0262434)
      PathPoint P4: tibia_l (-0.0129611 -0.0855665 0.0281016)
      PathPoint P5: tibia_l (0.00309691 -0.109654 0.0221372)
    Thelen2003Muscle bifemlh_l: max_isometric_force=1792 optimal_fiber_length=0.1161157 tendon_slack_length=0.3472819
        pennation_angle_at_optimal=0
      PathPoint P1: pelvis (-0.145169 -0.118212 -0.0744096)
      PathPoint P2: tibia_l (-0.0345248 -0.0412921 -0.0337563)
      PathPoint P3: tibia_l (-0.0268399 -0.0645763 -0.0393422)
    Thelen2003Muscle bifemsh_l: max_isometric_force=1608 optimal_fiber_length=0.1865656 tendon_slack_length=0.09597884
        pennation_angle_at_optimal=0.4014257
      PathPoint P1: femur_l (0.00532722 -0.224915 -0.0249314)
      PathPoint P2: tibia_l (-0.0345248 -0.0412921 -0.0337563)
      PathPoint P3: tibia_l (-0.0268399 -0.0645763 -0.0393422)
    Thelen2003Muscle sar_l: max_isometric_force=312 optimal_fiber_length=0.5650092 tendon_slack_length=0.1086556
        pennation_angle_at_optimal=0
      PathPoint P1: pelvis (-0.0176332 -0.00149825 -0.133089)
      PathPoint P2: femur_l (-0.00319633 -0.38015 0.0448552)
      PathPoint P3: tibia_l (-0.00642322 -0.0480594 0.0457654)
      PathPoint P4: tibia_l (0.00688202 -0.0675585 0.0439302)
      PathPoint P5: tibia_l (0.0278722 -0.0963483 0.0289045)
    Thelen2003Muscle add_long_l: max_isometric_force=1254 optimal_fiber_length=0.1466305 tendon_slack_length=0.1168794
        pennation_angle_at_optimal=0.1047198
      PathPoint P1: pelvis (-0.0364189 -0.0963488 -0.0181095)
      PathPoint P2: femur_l (0.00532722 -0.224915 -0.0249314)
    Thelen2003Muscle add_brev_l: max_isometric_force=858 optimal_fiber_length=0.1405797 tendon_slack_length=0.02113981
        pennation_angle_at_optimal=0
      PathPoint P1: pelvis (-0.0676516 -0.105454 -0.0175737)
      PathPoint P2: femur_l (0.000958899 -0.127427 -0.031324)
    Thelen2003Muscle add_mag1_l: max_isometric_force=762 optimal_fiber_length=0.09091274 tendon_slack_length=0.06269844
        pennation_angle_at_optimal=0.08726646
      PathPoint P1: pelvis (-0.0843628 -0.135303 -0.027325)
      PathPoint P2: femur_l (-0.0047945 -0.129025 -0.0361185)
    Thelen2003Muscle add_mag2_l: max_isometric_force=686 optimal_fiber_length=0.1264041 tendon_slack_length=0.1253595
        pennation_angle_at_optimal=0.05235988
      PathPoint P1: pelvis (-0.0957725 -0.137378 -0.0330043)
      PathPoint P2: femur_l (0.0057534 -0.243454 -0.0241856)
    Thelen2003Muscle add_mag3_l: max_isometric_force=976 optimal_fiber_length=0.1381748 tendon_slack_length=0.2626376
        pennation_angle_at_optimal=0.08726646
      PathPoint P1: pelvis (-0.128019 -0.131535 -0.0523139)
      PathPoint P2: femur_l (0.00745811 -0.408811 0.0283408)
    Thelen2003Muscle tfl_l: max_isometric_force=466 optimal_fiber_length=0.1028692 tendon_slack_length=0.4602045
        pennation_angle_at_optimal=0.05235988
      PathPoint P1: pelvis (-0.0358427 0.0246634 -0.132982)
      PathPoint P2: femur_l (0.031324 -0.106012 -0.063607)
      PathPoint P3: femur_l (0.0057534 -0.431398 -0.0380363)
      PathPoint P4: tibia_l (0.00688202 -0.0558591 -0.034066)
    Thelen2003Muscle pect_l: max_isometric_force=532 optimal_fiber_length=0.1069819 tendon_slack_length=0.03530402
        pennation_angle_at_optimal=0
      PathPoint P1: pelvis (-0.0496726 -0.0885118 -0.0483277)
      PathPoint P2: femur_l (-0.0129984 -0.0875795 -0.0269557)
    Thelen2003Muscle grac_l: max_isometric_force=324 optimal_fiber_length=0.3760266 tendon_slack_length=0.1346004
        pennation_angle_at_optimal=0.05235988
      PathPoint P1: pelvis (-0.0852963 -0.136801 -0.0299396)
      ConditionalPathPoint P2: tibia_l (-0.0304759 -0.0365894 0.0432879) range=(-0.436332 0.174533)
          coordinate=knee_angle_l
      PathPoint P3: tibia_l (-0.0222863 -0.0591051 0.0410627)
      PathPoint P4: tibia_l (0.00688202 -0.0958895 0.0261517)
    Thelen2003Muscle glut_max1_l: max_isometric_force=1146 optimal_fiber_length=0.1593178 tendon_slack_length=0.1402445
        pennation_angle_at_optimal=0.08726646
      PathPoint P1: pelvis (-0.137723 0.0705328 -0.0750097)
      PathPoint P2: pelvis (-0.148787 0.001383 -0.0949409)
      PathPoint P3: femur_l (-0.0486908 -0.026423 -0.0417654)
      PathPoint P4: femur_l (-0.0295128 -0.0603041 -0.0500759)
    Thelen2003Muscle glut_max2_l: max_isometric_force=1638 optimal_fiber_length=0.1627242 tendon_slack_length=0.1405849
        pennation_angle_at_optimal=0
      PathPoint P1: pelvis (-0.155472 0.020284 -0.0603293)
      PathPoint P2: pelvis (-0.158584 -0.0599299 -0.0979413)
      PathPoint P3: femur_l (-0.0453879 -0.0564685 -0.0312175)
      PathPoint P4: femur_l (-0.0166209 -0.108249 -0.0446421)
    Thelen2003Muscle glut_max3_l: max_isometric_force=1104 optimal_fiber_length=0.1582593 tendon_slack_length=0.1593583
        pennation_angle_at_optimal=0.08726646
      PathPoint P1: pelvis (-0.179329 -0.0361884 -0.00621509)
      PathPoint P2: pelvis (-0.176217 -0.121243 -0.0431842)
      PathPoint P3: femur_l (-0.0318568 -0.110913 -0.0143835)
      PathPoint P4: femur_l (-0.00639266 -0.151186 -0.0437897)
    Thelen2003Muscle iliacus_l: max_isometric_force=2146 optimal_fiber_length=0.1127129 tendon_slack_length=0.1127129
        pennation_angle_at_optimal=0.1221731
      PathPoint P1: pelvis (-0.0776783 0.0420662 -0.0915119)
      PathPoint P2: pelvis (-0.0297344 -0.0633874 -0.0869041)
      ConditionalPathPoint P3: pelvis (-0.0331919 -0.092776 -0.0874399) range=(-1.5708 0.785398)
          coordinate=hip_flexion_l
      PathPoint P4: femur_l (0.00181125 -0.0578536 -0.00607303)
      PathPoint P5: femur_l (-0.0205631 -0.0661641 -0.0137442)
    Thelen2003Muscle psoas_l: max_isometric_force=2226 optimal_fiber_length=0.1129468 tendon_slack_length=0.1807149
        pennation_angle_at_optimal=0.1396263
      PathPoint P1: pelvis (-0.0745666 0.102227 -0.0309683)
      PathPoint P2: pelvis (-0.0274294 -0.0656924 -0.081332)
      ConditionalPathPoint P3: pelvis (-0.0331919 -0.092776 -0.0874399) range=(-1.5708 0.785398)
          coordinate=hip_flexion_l
      PathPoint P4: femur_l (0.00170471 -0.054018 -0.00404869)
      PathPoint P5: femur_l (-0.0200303 -0.063607 -0.0110806)
    Thelen2003Muscle quad_fem_l: max_isometric_force=762 optimal_fiber_length=0.05869617 tendon_slack_length=0.02608719
        pennation_angle_at_optimal=0
      PathPoint P1: pelvis (-0.13173 -0.132652 -0.0557215)
      PathPoint P2: femur_l (-0.0405934 -0.0382494 -0.0389952)
    Thelen2003Muscle gem_l: max_isometric_force=328 optimal_fiber_length=0.02633653 tendon_slack_length=0.04279686
        pennation_angle_at_optimal=0
      PathPoint P1: pelvis (-0.130578 -0.0945048 -0.0765099)
      PathPoint P2: femur_l (-0.0151293 -0.00351596 -0.0471992)
    Thelen2003Muscle peri_l: max_isometric_force=888 optimal_fiber_length=0.02880462 tendon_slack_length=0.127405
        pennation_angle_at_optimal=0.1745329
      PathPoint P1: pelvis (-0.160889 0.000345749 -0.0251818)
      PathPoint P2: pelvis (-0.137493 -0.0318089 -0.070402)
      PathPoint P3: femur_l (-0.0157686 -0.0038356 -0.0465599)
    Thelen2003Muscle rect_fem_l: max_isometric_force=2338 optimal_fiber_length=0.1227329 tendon_slack_length=0.4327951
        pennation_angle_at_optimal=0.08726646
      PathPoint P1: pelvis (-0.0339987 -0.0358427 -0.103728)
      ConditionalPathPoint P2: femur_l (0.0355858 -0.429374 -0.00202434) range=(-2.61799 -1.45997)
          coordinate=knee_angle_l
      PathPoint P3: patella_l (0.0128919 0.0465599 0.00106544)
      PathPoint P4: patella_l (0.00532722 0.00263678 -3.67472e-5)
      PathPoint P5: tibia_l (0.043462 -0.0819171 -0.000760452)
    Thelen2003Muscle vas_med_l: max_isometric_force=2588 optimal_fiber_length=0.09571876 tendon_slack_length=0.2366082
        pennation_angle_at_optimal=0.08726646
      PathPoint P1: femur_l (0.0149162 -0.223637 -0.0200303)
      PathPoint P2: femur_l (0.0379298 -0.295021 -0.000958899)
      ConditionalPathPoint P3: femur_l (0.0394214 -0.431292 0.013318) range=(-2.61799 -1.21004) coordinate=knee_angle_l
      ConditionalPathPoint P4: femur_l (0.0291932 -0.453346 0.0139573) range=(-2.61799 -1.78006)
          coordinate=knee_angle_l
      PathPoint P5: patella_l (0.00671229 0.0474122 0.0181125)
      PathPoint P6: patella_l (0.00532722 0.00263165 0.00905256)
      PathPoint P7: tibia_l (0.0426513 -0.0824346 0.00648418)
    Thelen2003Muscle vas_int_l: max_isometric_force=2730 optimal_fiber_length=0.0935377 tendon_slack_length=0.2472836
        pennation_angle_at_optimal=0.05235988
      PathPoint P1: femur_l (0.0308979 -0.204991 -0.0330288)
      PathPoint P2: femur_l (0.0356924 -0.222038 -0.0303651)
      ConditionalPathPoint P3: femur_l (0.0365447 -0.429374 -0.00585994) range=(-2.61799 -1.42) coordinate=knee_angle_l
      PathPoint P4: patella_l (0.00617957 0.0511413 0.000639266)
      PathPoint P5: patella_l (0.00532722 0.00263165 0.000419657)
      PathPoint P6: tibia_l (0.0434272 -0.0820144 -0.000804107)
    Thelen2003Muscle vas_lat_l: max_isometric_force=3742 optimal_fiber_length=0.09027688 tendon_slack_length=0.2676065
        pennation_angle_at_optimal=0.08726646
      PathPoint P1: femur_l (0.00511413 -0.197533 -0.037184)
      PathPoint P2: femur_l (0.0286604 -0.276056 -0.0435766)
      ConditionalPathPoint P3: femur_l (0.0384625 -0.429374 -0.0218416) range=(-2.61799 -1.21004)
          coordinate=knee_angle_l
      ConditionalPathPoint P4: femur_l (0.0269557 -0.452068 -0.0196042) range=(-2.61799 -1.92004)
          coordinate=knee_angle_l
      PathPoint P5: patella_l (0.0109741 0.0450683 -0.0150228)
      PathPoint P6: patella_l (0.00532722 0.00263165 -0.0078098)
      PathPoint P7: tibia_l (0.0433911 -0.0822179 -0.00715732)
    Thelen2003Muscle med_gas_l: max_isometric_force=3116 optimal_fiber_length=0.06857708 tendon_slack_length=0.445751
        pennation_angle_at_optimal=0.296706
      PathPoint P1: femur_l (-0.0202434 -0.418613 0.0250379)
      ConditionalPathPoint P2: femur_l (-0.0319633 -0.428521 0.0274884) range=(-0.785398 0.174533)
          coordinate=knee_angle_l
      PathPoint P3: calcn_l (0 0.0375515 0.00642009)
    Thelen2003Muscle lat_gas_l: max_isometric_force=1366 optimal_fiber_length=0.07318545 tendon_slack_length=0.4345386
        pennation_angle_at_optimal=0.1396263
      PathPoint P1: femur_l (-0.0234398 -0.420424 -0.0289801)
      ConditionalPathPoint P2: femur_l (-0.0319633 -0.428095 -0.0291932) range=(-0.785398 0.174533)
          coordinate=knee_angle_l
      PathPoint P3: calcn_l (0 0.0375515 0.00642009)
    Thelen2003Muscle soleus_l: max_isometric_force=7098 optimal_fiber_length=0.05755701 tendon_slack_length=0.287785
        pennation_angle_at_optimal=0.4363323
      PathPoint P1: tibia_l (-0.00275281 -0.175836 -0.00814372)
      PathPoint P2: calcn_l (0 0.0375515 0.00642009)
    Thelen2003Muscle tib_post_l: max_isometric_force=3176 optimal_fiber_length=0.03581978 tendon_slack_length=0.3581978
        pennation_angle_at_optimal=0.2094395
      PathPoint P1: tibia_l (-0.0107818 -0.154616 -0.00217931)
      PathPoint P2: tibia_l (-0.0165168 -0.464651 0.0262664)
      PathPoint P3: calcn_l (0.0505128 0.0404587 0.0346443)
      PathPoint P4: calcn_l (0.0935153 0.0192603 0.0340386)
    Thelen2003Muscle flex_dig_l: max_isometric_force=620 optimal_fiber_length=0.04002936 tendon_slack_length=0.4709337
        pennation_angle_at_optimal=0.1221731
      PathPoint P1: tibia_l (-0.00952013 -0.234677 0.00206461)
      PathPoint P2: tibia_l (-0.0176639 -0.464651 0.0224813)
      PathPoint P3: calcn_l (0.0528143 0.0381571 0.0339175)
      PathPoint P4: calcn_l (0.0857627 0.0213195 0.0318582)
      PathPoint P5: calcn_l (0.20084 -0.00981184 -0.0140515)
      PathPoint P6: toes_l (-0.00230154 -0.00944844 -0.0178067)
      PathPoint P7: toes_l (0.0345231 -0.0086005 -0.0260438)
      PathPoint P8: toes_l (0.05342 -0.00726803 -0.0293144)
    Thelen2003Muscle flex_hal_l: max_isometric_force=644 optimal_fiber_length=0.05073588 tendon_slack_length=0.4483636
        pennation_angle_at_optimal=0.1745329
      PathPoint P1: tibia_l (-0.00906133 -0.267711 -0.0279869)
      PathPoint P2: tibia_l (-0.0213343 -0.467863 0.0199579)
      PathPoint P3: calcn_l (0.045304 0.0334329 0.0291932)
      PathPoint P4: calcn_l (0.125737 0.0082371 0.0310102)
      PathPoint P5: calcn_l (0.209077 -0.00642009 0.032585)
      PathPoint P6: toes_l (0.0187757 -0.00775256 0.0321005)
      PathPoint P7: toes_l (0.0680772 -0.0123556 0.0219252)
    Thelen2003Muscle tib_ant_l: max_isometric_force=1810 optimal_fiber_length=0.1136048 tendon_slack_length=0.2585088
        pennation_angle_at_optimal=0.08726646
      PathPoint P1: tibia_l (0.0205314 -0.186273 -0.0131905)
      PathPoint P2: tibia_l (0.0377364 -0.453181 0.020302)
      PathPoint P3: calcn_l (0.141242 0.0215618 0.0369458)
    Thelen2003Muscle per_brev_l: max_isometric_force=870 optimal_fiber_length=0.05794906 tendon_slack_length=0.186596
        pennation_angle_at_optimal=0.08726646
      PathPoint P1: tibia_l (-0.00802902 -0.303497 -0.0372776)
      PathPoint P2: tibia_l (-0.0227107 -0.479906 -0.0324602)
      PathPoint P3: tibia_l (-0.0165168 -0.492638 -0.0331484)
      PathPoint P4: calcn_l (0.057054 0.0327061 -0.0282242)
      PathPoint P5: calcn_l (0.0820076 0.0265283 -0.0415489)
    Thelen2003Muscle per_long_l: max_isometric_force=1886 optimal_fiber_length=0.05711564 tendon_slack_length=0.4021407
        pennation_angle_at_optimal=0.1745329
      PathPoint P1: tibia_l (0.000573502 -0.17985 -0.0415215)
      PathPoint P2: tibia_l (-0.023743 -0.482315 -0.0328043)
      PathPoint P3: tibia_l (-0.0185815 -0.495391 -0.0331484)
      PathPoint P4: calcn_l (0.0530566 0.0278608 -0.0267706)
      PathPoint P5: calcn_l (0.0824921 0.0128402 -0.034402)
      PathPoint P6: calcn_l (0.103206 0.00835823 -0.0142938)
      PathPoint P7: calcn_l (0.145724 0.0102964 0.0222886)
    Thelen2003Muscle per_tert_l: max_isometric_force=360 optimal_fiber_length=0.09187208 tendon_slack_length=0.1162938
        pennation_angle_at_optimal=0.2268928
      PathPoint P1: tibia_l (0.001147 -0.32162 -0.0264958)
      PathPoint P2: tibia_l (0.0262664 -0.466716 -0.0182374)
      PathPoint P3: calcn_l (0.103812 0.0276185 -0.036219)
    Thelen2003Muscle ext_dig_l: max_isometric_force=1024 optimal_fiber_length=0.1194219 tendon_slack_length=0.403927
        pennation_angle_at_optimal=0.1396263
      PathPoint P1: tibia_l (0.00367041 -0.158401 -0.0316573)
      PathPoint P2: tibia_l (0.0331484 -0.459604 -0.00825842)
      PathPoint P3: calcn_l (0.111685 0.0469999 0.000121134)
      PathPoint P4: calcn_l (0.195752 0.00666236 -0.0157474)
      PathPoint P5: toes_l (0.000363401 0.00569329 -0.0185335)
      PathPoint P6: toes_l (0.0536623 -0.000484535 -0.0302834)
    Thelen2003Muscle ext_hal_l: max_isometric_force=324 optimal_fiber_length=0.1302957 tendon_slack_length=0.3580197
        pennation_angle_at_optimal=0.1047198
      PathPoint P1: tibia_l (0.0013764 -0.202676 -0.0261517)
      PathPoint P2: tibia_l (0.0373923 -0.457081 0.00974953)
      PathPoint P3: calcn_l (0.1175 0.047121 0.0255592)
      PathPoint P4: calcn_l (0.156626 0.0374303 0.0311314)
      PathPoint P5: calcn_l (0.210046 0.0168376 0.0339175)
      PathPoint P6: toes_l (0.0360979 0.00496649 0.0296778)
      PathPoint P7: toes_l (0.0681983 0.00411855 0.0225309)
    Thelen2003Muscle ercspn_r: max_isometric_force=5000 optimal_fiber_length=0.1331403 tendon_slack_length=0.03328508
        pennation_angle_at_optimal=0
      PathPoint P1: pelvis (-0.16135 0.0505946 0.0467203)
      PathPoint P2: torso (-0.0669994 0.120425 0.0293579)
    Thelen2003Muscle ercspn_l: max_isometric_force=5000 optimal_fiber_length=0.1331403 tendon_slack_length=0.03328508
        pennation_angle_at_optimal=0
      PathPoint P1: pelvis (-0.16135 0.0505946 -0.0467203)
      PathPoint P2: torso (-0.0669994 0.120425 -0.0293579)
    Thelen2003Muscle intobl_r: max_isometric_force=1800 optimal_fiber_length=0.1087853 tendon_slack_length=0.1087853
        pennation_angle_at_optimal=0
      PathPoint P1: pelvis (-0.0460999 0.0806748 0.12398)
      PathPoint P2: torso (0.0852719 0.175164 0.0182726)
    Thelen2003Muscle intobl_l: max_isometric_force=1800 optimal_fiber_length=0.1087853 tendon_slack_length=0.1087853
        pennation_angle_at_optimal=0
      PathPoint P1: pelvis (-0.0460999 0.0806748 -0.12398)
      PathPoint P2: torso (0.0852719 0.175164 -0.0182726)
    Thelen2003Muscle extobl_r: max_isometric_force=1800 optimal_fiber_length=0.137036 tendon_slack_length=0.1598754
        pennation_angle_at_optimal=0
      PathPoint P1: pelvis (-0.0345749 -0.0732988 0.0107157)
      PathPoint P2: torso (0.0791811 0.120425 0.133999)
    Thelen2003Muscle extobl_l: max_isometric_force=1800 optimal_fiber_length=0.137036 tendon_slack_length=0.1598754
        pennation_angle_at_optimal=0
      PathPoint P1: pelvis (-0.0345749 -0.0732988 -0.0107157)
      PathPoint P2: torso (0.0791811 0.120425 -0.133999)
    ObjectGroup R_hip_abd: members=(glut_max1_r glut_med1_r glut_med2_r glut_med3_r glut_min1_r glut_min2_r glut_min3_r peri_r sar_r tfl_r)
    ObjectGroup R_hip_flex: members=(add_brev_r add_long_r glut_med1_r glut_min1_r grac_r iliacus_r pect_r psoas_r rect_fem_r sar_r tfl_r)
    ObjectGroup R_hip_inrot: members=(glut_med1_r glut_min1_r iliacus_r psoas_r tfl_r)
    ObjectGroup R_hip_exrot: members=(gem_r glut_med3_r glut_min3_r peri_r quad_fem_r)
    ObjectGroup R_hip_ext: members=(add_long_r add_mag1_r add_mag2_r add_mag3_r bifemlh_r glut_max1_r glut_max2_r glut_max3_r glut_med3_r glut_min3_r semimem_r semiten_r)
    ObjectGroup R_hip_add: members=(add_brev_r add_long_r add_mag1_r add_mag2_r add_mag3_r bifemlh_r grac_r pect_r semimem_r semiten_r)
    ObjectGroup R_knee_bend: members=(bifemlh_r bifemsh_r grac_r lat_gas_r med_gas_r sar_r semimem_r semiten_r)
    ObjectGroup R_knee_ext: members=(rect_fem_r vas_int_r vas_lat_r vas_med_r)
    ObjectGroup R_ankle_pf: members=(flex_dig_r flex_hal_r lat_gas_r med_gas_r per_brev_r per_long_r soleus_r tib_post_r)
    ObjectGroup R_inverter: members=(ext_hal_r flex_dig_r flex_hal_r tib_ant_r tib_post_r)
    ObjectGroup R_ankle_df: members=(ext_dig_r ext_hal_r per_tert_r tib_ant_r)
    ObjectGroup R_everter: members=(ext_dig_r per_brev_r per_long_r per_tert_r)
    ObjectGroup L_hip_abd: members=(glut_max1_l glut_med1_l glut_med2_l glut_med3_l glut_min1_l glut_min2_l glut_min3_l peri_l sar_l tfl_l)
    ObjectGroup L_hip_flex: members=(add_brev_l add_long_l glut_med1_l glut_min1_l grac_l iliacus_l pect_l psoas_l rect_fem_l sar_l tfl_l)
    ObjectGroup L_hip_inrot: members=(glut_med1_l glut_min1_l iliacus_l psoas_l tfl_l)
    ObjectGroup L_hip_exrot: members=(gem_l glut_med3_l glut_min3_l peri_l quad_fem_l)
    ObjectGroup L_hip_ext: members=(add_long_l add_mag1_l add_mag2_l add_mag3_l bifemlh_l glut_max1_l glut_max2_l glut_max3_l glut_med3_l glut_min3_l semimem_l semiten_l)
    ObjectGroup L_hip_add: members=(add_brev_l add_long_l add_mag1_l add_mag2_l add_mag3_l bifemlh_l grac_l pect_l semimem_l semiten_l)
    ObjectGroup L_knee_bend: members=(bifemlh_l bifemsh_l grac_l lat_gas_l med_gas_l sar_l semimem_l semiten_l)
    ObjectGroup L_knee_ext: members=(rect_fem_l vas_int_l vas_lat_l vas_med_l)
    ObjectGroup L_ankle_pf: members=(flex_dig_l flex_hal_l lat_gas_l med_gas_l per_brev_l per_long_l soleus_l tib_post_l)
    ObjectGroup L_inverter: members=(ext_hal_l flex_dig_l flex_hal_l tib_ant_l tib_post_l)
    ObjectGroup L_ankle_df: members=(ext_dig_l ext_hal_l per_tert_l tib_ant_l)
    ObjectGroup L_everter: members=(ext_dig_l per_brev_l per_long_l per_tert_l)
    ObjectGroup back_ext: members=(ercspn_l ercspn_r)
    ObjectGroup back_rlb: members=(ercspn_r extobl_r intobl_r)
    ObjectGroup back_introt: members=(ercspn_r extobl_l intobl_r)
    ObjectGroup back_llb: members=(ercspn_l extobl_l intobl_l)
    ObjectGroup back_extrot: members=(ercspn_l extobl_r intobl_l)
    ObjectGroup back_flex: members=(extobl_l extobl_r intobl_l intobl_r)
  MarkerSet:
    Marker R.Shoulder: torso (0 0.457616 0.17298) fixed=true
    Marker L.Shoulder: torso (0 0.457616 -0.17298) fixed=true
    Marker R.Clavicle: torso (0.0736634 0.418955 0.0372839)
    Marker L.Clavicle: torso (0.074005 0.418044 -0.024392)
    Marker R.Biceps: humerus_r (0.0495841 -0.170303 -0.00821507)
    Marker R.Elbow: humerus_r (0.0321506 -0.30487 0.034213)
    Marker R.Forearm: ulna_r (0.00792748 -0.154434 0.0541847)
    Marker R.Wrist: radius_r (-0.0280246 -0.265498 0.0114757)
    Marker L.Biceps: humerus_l (-0.0101864 -0.145025 -0.0263925)
    Marker L.Elbow: humerus_l (0.0245832 -0.305172 -0.0352969)
    Marker L.Forearm: ulna_l (0.0438066 -0.148311 -0.0374371)
    Marker L.Wrist: radius_l (-0.0275227 -0.274993 -0.0122074)
    Marker R.ASIS: pelvis (0.0149825 0.011525 0.137161) fixed=true
    Marker L.ASIS: pelvis (0.0149825 0.011525 -0.137161) fixed=true
    Marker S2: pelvis (-0.164421 0.0583253 -0.00746204)
    Marker R.PSIS: pelvis (-0.165548 0.0638565 0.0423145)
    Marker L.PSIS: pelvis (-0.165356 0.0598643 -0.0617002)
    Marker R.TH1: femur_r (0.0413586 -0.0900356 0.117485)
    Marker R.TH2: femur_r (-0.0643458 -0.092249 0.0865193)
    Marker R.TH3: femur_r (-0.0658475 -0.223203 0.0772199)
    Marker R.Knee: femur_r (0 -0.430439 0.0500759) fixed=true
    Marker R.SH1: tibia_r (-0.00180127 -0.126199 0.0878452)
    Marker R.SH2: tibia_r (0.0117873 -0.236371 0.082338)
    Marker R.SH3: tibia_r (-0.0846295 -0.139759 0.0811638)
    Marker R.SH4: tibia_r (-0.0697781 -0.258634 0.0734807)
    Marker R.Ankle: tibia_r (-0.00573502 -0.470271 0.0607912) fixed=true
    Marker R.Toe: calcn_r (0.252142 0.0234653 -0.0284811)
    Marker R.MT5: calcn_r (0.177591 0.000753297 0.0613498)
    Marker R.Heel: calcn_r (-0.0363401 0.0145361 -0.0121134) fixed=true
    Marker L.TH1: femur_l (0.0785966 -0.127599 -0.101216)
    Marker L.TH2: femur_l (0.0828136 -0.260805 -0.0917969)
    Marker L.TH3: femur_l (-0.0273147 -0.122276 -0.100363)
    Marker L.TH4: femur_l (-0.0353865 -0.25847 -0.0952185)
    Marker L.Knee: femur_l (0 -0.430439 -0.0500759) fixed=true
    Marker L.Ankle: tibia_l (-0.00573502 -0.471418 -0.0607912) fixed=true
    Marker L.SH1: tibia_l (0.0312422 -0.0984244 -0.0618157)
    Marker L.SH2: tibia_l (-0.0605915 -0.0887882 -0.07588)
    Marker L.SH3: tibia_l (-0.0643684 -0.20377 -0.0863317)
    Marker L.Toe: calcn_l (0.256248 0.0205112 0.0326515)
    Marker L.Heel: calcn_l (-0.0363401 0.0145361 0.0121134) fixed=true
    Marker L.MT5: calcn_l (0.184075 -0.00133035 -0.0616606)
  ProbeSet:
    Umberger2010MuscleMetabolicsProbe metabolic_power_umb: probe_operation=value activation_maintenance_rate_on=true
        shortening_rate_on=true basal_rate_on=false mechanical_work_rate_on=true report_total_metabolics_only=false
      Umberger2010MuscleMetabolicsProbe_MetabolicMuscleParameterSet:
        Umberger2010MuscleMetabolicsProbe_MetabolicMuscleParameter glut_med1_r: ratio_slow_twitch_fibers=0.55
            use_provided_muscle_mass=false
        Umberger2010MuscleMetabolicsProbe_MetabolicMuscleParameter glut_med2_r: ratio_slow_twitch_fibers=0.55
            use_provided_muscle_mass=false
        Umberger2010MuscleMetabolicsProbe_MetabolicMuscleParameter glut_med3_r: ratio_slow_twitch_fibers=0.55
            use_provided_muscle_mass=false
        Umberger2010MuscleMetabolicsProbe_MetabolicMuscleParameter glut_min1_r: ratio_slow_twitch_fibers=0.55
            use_provided_muscle_mass=false
        Umberger2010MuscleMetabolicsProbe_MetabolicMuscleParameter glut_min2_r: ratio_slow_twitch_fibers=0.55
            use_provided_muscle_mass=false
        Umberger2010MuscleMetabolicsProbe_MetabolicMuscleParameter glut_min3_r: ratio_slow_twitch_fibers=0.55
            use_provided_muscle_mass=false
        Umberger2010MuscleMetabolicsProbe_MetabolicMuscleParameter semimem_r: ratio_slow_twitch_fibers=0.4925
            use_provided_muscle_mass=false
        Umberger2010MuscleMetabolicsProbe_MetabolicMuscleParameter semiten_r: ratio_slow_twitch_fibers=0.425
            use_provided_muscle_mass=false
        Umberger2010MuscleMetabolicsProbe_MetabolicMuscleParameter bifemlh_r: ratio_slow_twitch_fibers=0.5425
            use_provided_muscle_mass=false
        Umberger2010MuscleMetabolicsProbe_MetabolicMuscleParameter bifemsh_r: ratio_slow_twitch_fibers=0.529
            use_provided_muscle_mass=false
        Umberger2010MuscleMetabolicsProbe_MetabolicMuscleParameter sar_r: ratio_slow_twitch_fibers=0.5
            use_provided_muscle_mass=false
        Umberger2010MuscleMetabolicsProbe_MetabolicMuscleParameter add_long_r: ratio_slow_twitch_fibers=0.5
            use_provided_muscle_mass=false
        Umberger2010MuscleMetabolicsProbe_MetabolicMuscleParameter add_brev_r: ratio_slow_twitch_fibers=0.5
            use_provided_muscle_mass=false
        Umberger2010MuscleMetabolicsProbe_MetabolicMuscleParameter add_mag1_r: ratio_slow_twitch_fibers=0.552
            use_provided_muscle_mass=false
        Umberger2010MuscleMetabolicsProbe_MetabolicMuscleParameter add_mag2_r: ratio_slow_twitch_fibers=0.552
            use_provided_muscle_mass=false
        Umberger2010MuscleMetabolicsProbe_MetabolicMuscleParameter add_mag3_r: ratio_slow_twitch_fibers=0.552
            use_provided_muscle_mass=false
        Umberger2010MuscleMetabolicsProbe_MetabolicMuscleParameter tfl_r: ratio_slow_twitch_fibers=0.5
            use_provided_muscle_mass=false
        Umberger2010MuscleMetabolicsProbe_MetabolicMuscleParameter pect_r: ratio_slow_twitch_fibers=0.5
            use_provided_muscle_mass=false
        Umberger2010MuscleMetabolicsProbe_MetabolicMuscleParameter grac_r: ratio_slow_twitch_fibers=0.5
            use_provided_muscle_mass=false
        Umberger2010MuscleMetabolicsProbe_MetabolicMuscleParameter glut_max1_r: ratio_slow_twitch_fibers=0.55
            use_provided_muscle_mass=false
        Umberger2010MuscleMetabolicsProbe_MetabolicMuscleParameter glut_max2_r: ratio_slow_twitch_fibers=0.55
            use_provided_muscle_mass=false
        Umberger2010MuscleMetabolicsProbe_MetabolicMuscleParameter glut_max3_r: ratio_slow_twitch_fibers=0.55
            use_provided_muscle_mass=false
        Umberger2010MuscleMetabolicsProbe_MetabolicMuscleParameter iliacus_r: ratio_slow_twitch_fibers=0.5
            use_provided_muscle_mass=false
        Umberger2010MuscleMetabolicsProbe_MetabolicMuscleParameter psoas_r: ratio_slow_twitch_fibers=0.5
            use_provided_muscle_mass=false
        Umberger2010MuscleMetabolicsProbe_MetabolicMuscleParameter quad_fem_r: ratio_slow_twitch_fibers=0.5
            use_provided_muscle_mass=false
        Umberger2010MuscleMetabolicsProbe_MetabolicMuscleParameter gem_r: ratio_slow_twitch_fibers=0.5
            use_provided_muscle_mass=false
        Umberger2010MuscleMetabolicsProbe_MetabolicMuscleParameter peri_r: ratio_slow_twitch_fibers=0.5
            use_provided_muscle_mass=false
        Umberger2010MuscleMetabolicsProbe_MetabolicMuscleParameter rect_fem_r: ratio_slow_twitch_fibers=0.3865
            use_provided_muscle_mass=false
        Umberger2010MuscleMetabolicsProbe_MetabolicMuscleParameter vas_med_r: ratio_slow_twitch_fibers=0.503
            use_provided_muscle_mass=false
        Umberger2010MuscleMetabolicsProbe_MetabolicMuscleParameter vas_int_r: ratio_slow_twitch_fibers=0.543
            use_provided_muscle_mass=false
        Umberger2010MuscleMetabolicsProbe_MetabolicMuscleParameter vas_lat_r: ratio_slow_twitch_fibers=0.455
            use_provided_muscle_mass=false
        Umberger2010MuscleMetabolicsProbe_MetabolicMuscleParameter med_gas_r: ratio_slow_twitch_fibers=0.566
            use_provided_muscle_mass=false
        Umberger2010MuscleMetabolicsProbe_MetabolicMuscleParameter lat_gas_r: ratio_slow_twitch_fibers=0.507
            use_provided_muscle_mass=false
        Umberger2010MuscleMetabolicsProbe_MetabolicMuscleParameter soleus_r: ratio_slow_twitch_fibers=0.803
            use_provided_muscle_mass=false
        Umberger2010MuscleMetabolicsProbe_MetabolicMuscleParameter tib_post_r: ratio_slow_twitch_fibers=0.6
            use_provided_muscle_mass=false
        Umberger2010MuscleMetabolicsProbe_MetabolicMuscleParameter flex_dig_r: ratio_slow_twitch_fibers=0.6
            use_provided_muscle_mass=false
        Umberger2010MuscleMetabolicsProbe_MetabolicMuscleParameter flex_hal_r: ratio_slow_twitch_fibers=0.6
            use_provided_muscle_mass=false
        Umberger2010MuscleMetabolicsProbe_MetabolicMuscleParameter tib_ant_r: ratio_slow_twitch_fibers=0.7
            use_provided_muscle_mass=false
        Umberger2010MuscleMetabolicsProbe_MetabolicMuscleParameter per_brev_r: ratio_slow_twitch_fibers=0.6
            use_provided_muscle_mass=false
        Umberger2010MuscleMetabolicsProbe_MetabolicMuscleParameter per_long_r: ratio_slow_twitch_fibers=0.6
            use_provided_muscle_mass=false
        Umberger2010MuscleMetabolicsProbe_MetabolicMuscleParameter per_tert_r: ratio_slow_twitch_fibers=0.75
            use_provided_muscle_mass=false
        Umberger2010MuscleMetabolicsProbe_MetabolicMuscleParameter ext_dig_r: ratio_slow_twitch_fibers=0.75
            use_provided_muscle_mass=false
        Umberger2010MuscleMetabolicsProbe_MetabolicMuscleParameter ext_hal_r: ratio_slow_twitch_fibers=0.75
            use_provided_muscle_mass=false
        Umberger2010MuscleMetabolicsProbe_MetabolicMuscleParameter glut_med1_l: ratio_slow_twitch_fibers=0.55
            use_provided_muscle_mass=false
        Umberger2010MuscleMetabolicsProbe_MetabolicMuscleParameter glut_med2_l: ratio_slow_twitch_fibers=0.55
            use_provided_muscle_mass=false
        Umberger2010MuscleMetabolicsProbe_MetabolicMuscleParameter glut_med3_l: ratio_slow_twitch_fibers=0.55
            use_provided_muscle_mass=false
        Umberger2010MuscleMetabolicsProbe_MetabolicMuscleParameter glut_min1_l: ratio_slow_twitch_fibers=0.55
            use_provided_muscle_mass=false
        Umberger2010MuscleMetabolicsProbe_MetabolicMuscleParameter glut_min2_l: ratio_slow_twitch_fibers=0.55
            use_provided_muscle_mass=false
        Umberger2010MuscleMetabolicsProbe_MetabolicMuscleParameter glut_min3_l: ratio_slow_twitch_fibers=0.55
            use_provided_muscle_mass=false
        Umberger2010MuscleMetabolicsProbe_MetabolicMuscleParameter semimem_l: ratio_slow_twitch_fibers=0.4925
            use_provided_muscle_mass=false
        Umberger2010MuscleMetabolicsProbe_MetabolicMuscleParameter semiten_l: ratio_slow_twitch_fibers=0.425
            use_provided_muscle_mass=false
        Umberger2010MuscleMetabolicsProbe_MetabolicMuscleParameter bifemlh_l: ratio_slow_twitch_fibers=0.5425
            use_provided_muscle_mass=false
        Umberger2010MuscleMetabolicsProbe_MetabolicMuscleParameter bifemsh_l: ratio_slow_twitch_fibers=0.529
            use_provided_muscle_mass=false
        Umberger2010MuscleMetabolicsProbe_MetabolicMuscleParameter sar_l: ratio_slow_twitch_fibers=0.5
            use_provided_muscle_mass=false
        Umberger2010MuscleMetabolicsProbe_MetabolicMuscleParameter add_long_l: ratio_slow_twitch_fibers=0.5
            use_provided_muscle_mass=false
        Umberger2010MuscleMetabolicsProbe_MetabolicMuscleParameter add_brev_l: ratio_slow_twitch_fibers=0.5
            use_provided_muscle_mass=false
        Umberger2010MuscleMetabolicsProbe_MetabolicMuscleParameter add_mag1_l: ratio_slow_twitch_fibers=0.552
            use_provided_muscle_mass=false
        Umberger2010MuscleMetabolicsProbe_MetabolicMuscleParameter add_mag2_l: ratio_slow_twitch_fibers=0.552
            use_provided_muscle_mass=false
        Umberger2010MuscleMetabolicsProbe_MetabolicMuscleParameter add_mag3_l: ratio_slow_twitch_fibers=0.552
            use_provided_muscle_mass=false
        Umberger2010MuscleMetabolicsProbe_MetabolicMuscleParameter tfl_l: ratio_slow_twitch_fibers=0.5
            use_provided_muscle_mass=false
        Umberger2010MuscleMetabolicsProbe_MetabolicMuscleParameter pect_l: ratio_slow_twitch_fibers=0.5
            use_provided_muscle_mass=false
        Umberger2010MuscleMetabolicsProbe_MetabolicMuscleParameter grac_l: ratio_slow_twitch_fibers=0.5
            use_provided_muscle_mass=false
        Umberger2010MuscleMetabolicsProbe_MetabolicMuscleParameter glut_max1_l: ratio_slow_twitch_fibers=0.55
            use_provided_muscle_mass=false
        Umberger2010MuscleMetabolicsProbe_MetabolicMuscleParameter glut_max2_l: ratio_slow_twitch_fibers=0.55
            use_provided_muscle_mass=false
        Umberger2010MuscleMetabolicsProbe_MetabolicMuscleParameter glut_max3_l: ratio_slow_twitch_fibers=0.55
            use_provided_muscle_mass=false
        Umberger2010MuscleMetabolicsProbe_MetabolicMuscleParameter iliacus_l: ratio_slow_twitch_fibers=0.5
            use_provided_muscle_mass=false
        Umberger2010MuscleMetabolicsProbe_MetabolicMuscleParameter psoas_l: ratio_slow_twitch_fibers=0.5
            use_provided_muscle_mass=false
        Umberger2010MuscleMetabolicsProbe_MetabolicMuscleParameter quad_fem_l: ratio_slow_twitch_fibers=0.5
            use_provided_muscle_mass=false
        Umberger2010MuscleMetabolicsProbe_MetabolicMuscleParameter gem_l: ratio_slow_twitch_fibers=0.5
            use_provided_muscle_mass=false
        Umberger2010MuscleMetabolicsProbe_MetabolicMuscleParameter peri_l: ratio_slow_twitch_fibers=0.5
            use_provided_muscle_mass=false
        Umberger2010MuscleMetabolicsProbe_MetabolicMuscleParameter rect_fem_l: ratio_slow_twitch_fibers=0.3865
            use_provided_muscle_mass=false
        Umberger2010MuscleMetabolicsProbe_MetabolicMuscleParameter vas_med_l: ratio_slow_twitch_fibers=0.503
            use_provided_muscle_mass=false
        Umberger2010MuscleMetabolicsProbe_MetabolicMuscleParameter vas_int_l: ratio_slow_twitch_fibers=0.543
            use_provided_muscle_mass=false
        Umberger2010MuscleMetabolicsProbe_MetabolicMuscleParameter vas_lat_l: ratio_slow_twitch_fibers=0.455
            use_provided_muscle_mass=false
        Umberger2010MuscleMetabolicsProbe_MetabolicMuscleParameter med_gas_l: ratio_slow_twitch_fibers=0.566
            use_provided_muscle_mass=false
        Umberger2010MuscleMetabolicsProbe_MetabolicMuscleParameter lat_gas_l: ratio_slow_twitch_fibers=0.507
            use_provided_muscle_mass=false
        Umberger2010MuscleMetabolicsProbe_MetabolicMuscleParameter soleus_l: ratio_slow_twitch_fibers=0.803
            use_provided_muscle_mass=false
        Umberger2010MuscleMetabolicsProbe_MetabolicMuscleParameter tib_post_l: ratio_slow_twitch_fibers=0.6
            use_provided_muscle_mass=false
        Umberger2010MuscleMetabolicsProbe_MetabolicMuscleParameter flex_dig_l: ratio_slow_twitch_fibers=0.6
            use_provided_muscle_mass=false
        Umberger2010MuscleMetabolicsProbe_MetabolicMuscleParameter flex_hal_l: ratio_slow_twitch_fibers=0.6
            use_provided_muscle_mass=false
        Umberger2010MuscleMetabolicsProbe_MetabolicMuscleParameter tib_ant_l: ratio_slow_twitch_fibers=0.7
            use_provided_muscle_mass=false
        Umberger2010MuscleMetabolicsProbe_MetabolicMuscleParameter per_brev_l: ratio_slow_twitch_fibers=0.6
            use_provided_muscle_mass=false
        Umberger2010MuscleMetabolicsProbe_MetabolicMuscleParameter per_long_l: ratio_slow_twitch_fibers=0.6
            use_provided_muscle_mass=false
        Umberger2010MuscleMetabolicsProbe_MetabolicMuscleParameter per_tert_l: ratio_slow_twitch_fibers=0.75
            use_provided_muscle_mass=false
        Umberger2010MuscleMetabolicsProbe_MetabolicMuscleParameter ext_dig_l: ratio_slow_twitch_fibers=0.75
            use_provided_muscle_mass=false
        Umberger2010MuscleMetabolicsProbe_MetabolicMuscleParameter ext_hal_l: ratio_slow_twitch_fibers=0.75
            use_provided_muscle_mass=false
        Umberger2010MuscleMetabolicsProbe_MetabolicMuscleParameter ercspn_r: ratio_slow_twitch_fibers=0.6
            use_provided_muscle_mass=false
        Umberger2010MuscleMetabolicsProbe_MetabolicMuscleParameter ercspn_l: ratio_slow_twitch_fibers=0.6
            use_provided_muscle_mass=false
        Umberger2010MuscleMetabolicsProbe_MetabolicMuscleParameter intobl_r: ratio_slow_twitch_fibers=0.56
            use_provided_muscle_mass=false
        Umberger2010MuscleMetabolicsProbe_MetabolicMuscleParameter intobl_l: ratio_slow_twitch_fibers=0.56
            use_provided_muscle_mass=false
        Umberger2010MuscleMetabolicsProbe_MetabolicMuscleParameter extobl_r: ratio_slow_twitch_fibers=0.58
            use_provided_muscle_mass=false
        Umberger2010MuscleMetabolicsProbe_MetabolicMuscleParameter extobl_l: ratio_slow_twitch_fibers=0.58
            use_provided_muscle_mass=false
    Bhargava2004MuscleMetabolicsProbe metabolic_power_bha: probe_operation=value activation_rate_on=true
        maintenance_rate_on=true shortening_rate_on=true basal_rate_on=true mechanical_work_rate_on=true
        report_total_metabolics_only=false
      Bhargava2004MuscleMetabolicsProbe_MetabolicMuscleParameterSet:
        Bhargava2004MuscleMetabolicsProbe_MetabolicMuscleParameter [values shared by the 92 below unless stated]: use_provided_muscle_mass=false
            activation_constant_slow_twitch=40 activation_constant_fast_twitch=133 maintenance_constant_slow_twitch=74
            maintenance_constant_fast_twitch=111
        Bhargava2004MuscleMetabolicsProbe_MetabolicMuscleParameter glut_med1_r: ratio_slow_twitch_fibers=0.55
        Bhargava2004MuscleMetabolicsProbe_MetabolicMuscleParameter glut_med2_r: ratio_slow_twitch_fibers=0.55
        Bhargava2004MuscleMetabolicsProbe_MetabolicMuscleParameter glut_med3_r: ratio_slow_twitch_fibers=0.55
        Bhargava2004MuscleMetabolicsProbe_MetabolicMuscleParameter glut_min1_r: ratio_slow_twitch_fibers=0.55
        Bhargava2004MuscleMetabolicsProbe_MetabolicMuscleParameter glut_min2_r: ratio_slow_twitch_fibers=0.55
        Bhargava2004MuscleMetabolicsProbe_MetabolicMuscleParameter glut_min3_r: ratio_slow_twitch_fibers=0.55
        Bhargava2004MuscleMetabolicsProbe_MetabolicMuscleParameter semimem_r: ratio_slow_twitch_fibers=0.4925
        Bhargava2004MuscleMetabolicsProbe_MetabolicMuscleParameter semiten_r: ratio_slow_twitch_fibers=0.425
        Bhargava2004MuscleMetabolicsProbe_MetabolicMuscleParameter bifemlh_r: ratio_slow_twitch_fibers=0.5425
        Bhargava2004MuscleMetabolicsProbe_MetabolicMuscleParameter bifemsh_r: ratio_slow_twitch_fibers=0.529
        Bhargava2004MuscleMetabolicsProbe_MetabolicMuscleParameter sar_r: ratio_slow_twitch_fibers=0.5
        Bhargava2004MuscleMetabolicsProbe_MetabolicMuscleParameter add_long_r: ratio_slow_twitch_fibers=0.5
        Bhargava2004MuscleMetabolicsProbe_MetabolicMuscleParameter add_brev_r: ratio_slow_twitch_fibers=0.5
        Bhargava2004MuscleMetabolicsProbe_MetabolicMuscleParameter add_mag1_r: ratio_slow_twitch_fibers=0.552
        Bhargava2004MuscleMetabolicsProbe_MetabolicMuscleParameter add_mag2_r: ratio_slow_twitch_fibers=0.552
        Bhargava2004MuscleMetabolicsProbe_MetabolicMuscleParameter add_mag3_r: ratio_slow_twitch_fibers=0.552
        Bhargava2004MuscleMetabolicsProbe_MetabolicMuscleParameter tfl_r: ratio_slow_twitch_fibers=0.5
        Bhargava2004MuscleMetabolicsProbe_MetabolicMuscleParameter pect_r: ratio_slow_twitch_fibers=0.5
        Bhargava2004MuscleMetabolicsProbe_MetabolicMuscleParameter grac_r: ratio_slow_twitch_fibers=0.5
        Bhargava2004MuscleMetabolicsProbe_MetabolicMuscleParameter glut_max1_r: ratio_slow_twitch_fibers=0.55
        Bhargava2004MuscleMetabolicsProbe_MetabolicMuscleParameter glut_max2_r: ratio_slow_twitch_fibers=0.55
        Bhargava2004MuscleMetabolicsProbe_MetabolicMuscleParameter glut_max3_r: ratio_slow_twitch_fibers=0.55
        Bhargava2004MuscleMetabolicsProbe_MetabolicMuscleParameter iliacus_r: ratio_slow_twitch_fibers=0.5
        Bhargava2004MuscleMetabolicsProbe_MetabolicMuscleParameter psoas_r: ratio_slow_twitch_fibers=0.5
        Bhargava2004MuscleMetabolicsProbe_MetabolicMuscleParameter quad_fem_r: ratio_slow_twitch_fibers=0.5
        Bhargava2004MuscleMetabolicsProbe_MetabolicMuscleParameter gem_r: ratio_slow_twitch_fibers=0.5
        Bhargava2004MuscleMetabolicsProbe_MetabolicMuscleParameter peri_r: ratio_slow_twitch_fibers=0.5
        Bhargava2004MuscleMetabolicsProbe_MetabolicMuscleParameter rect_fem_r: ratio_slow_twitch_fibers=0.3865
        Bhargava2004MuscleMetabolicsProbe_MetabolicMuscleParameter vas_med_r: ratio_slow_twitch_fibers=0.503
        Bhargava2004MuscleMetabolicsProbe_MetabolicMuscleParameter vas_int_r: ratio_slow_twitch_fibers=0.543
        Bhargava2004MuscleMetabolicsProbe_MetabolicMuscleParameter vas_lat_r: ratio_slow_twitch_fibers=0.455
        Bhargava2004MuscleMetabolicsProbe_MetabolicMuscleParameter med_gas_r: ratio_slow_twitch_fibers=0.566
        Bhargava2004MuscleMetabolicsProbe_MetabolicMuscleParameter lat_gas_r: ratio_slow_twitch_fibers=0.507
        Bhargava2004MuscleMetabolicsProbe_MetabolicMuscleParameter soleus_r: ratio_slow_twitch_fibers=0.803
        Bhargava2004MuscleMetabolicsProbe_MetabolicMuscleParameter tib_post_r: ratio_slow_twitch_fibers=0.6
        Bhargava2004MuscleMetabolicsProbe_MetabolicMuscleParameter flex_dig_r: ratio_slow_twitch_fibers=0.6
        Bhargava2004MuscleMetabolicsProbe_MetabolicMuscleParameter flex_hal_r: ratio_slow_twitch_fibers=0.6
        Bhargava2004MuscleMetabolicsProbe_MetabolicMuscleParameter tib_ant_r: ratio_slow_twitch_fibers=0.7
        Bhargava2004MuscleMetabolicsProbe_MetabolicMuscleParameter per_brev_r: ratio_slow_twitch_fibers=0.6
        Bhargava2004MuscleMetabolicsProbe_MetabolicMuscleParameter per_long_r: ratio_slow_twitch_fibers=0.6
        Bhargava2004MuscleMetabolicsProbe_MetabolicMuscleParameter per_tert_r: ratio_slow_twitch_fibers=0.75
        Bhargava2004MuscleMetabolicsProbe_MetabolicMuscleParameter ext_dig_r: ratio_slow_twitch_fibers=0.75
        Bhargava2004MuscleMetabolicsProbe_MetabolicMuscleParameter ext_hal_r: ratio_slow_twitch_fibers=0.75
        Bhargava2004MuscleMetabolicsProbe_MetabolicMuscleParameter glut_med1_l: ratio_slow_twitch_fibers=0.55
        Bhargava2004MuscleMetabolicsProbe_MetabolicMuscleParameter glut_med2_l: ratio_slow_twitch_fibers=0.55
        Bhargava2004MuscleMetabolicsProbe_MetabolicMuscleParameter glut_med3_l: ratio_slow_twitch_fibers=0.55
        Bhargava2004MuscleMetabolicsProbe_MetabolicMuscleParameter glut_min1_l: ratio_slow_twitch_fibers=0.55
        Bhargava2004MuscleMetabolicsProbe_MetabolicMuscleParameter glut_min2_l: ratio_slow_twitch_fibers=0.55
        Bhargava2004MuscleMetabolicsProbe_MetabolicMuscleParameter glut_min3_l: ratio_slow_twitch_fibers=0.55
        Bhargava2004MuscleMetabolicsProbe_MetabolicMuscleParameter semimem_l: ratio_slow_twitch_fibers=0.4925
        Bhargava2004MuscleMetabolicsProbe_MetabolicMuscleParameter semiten_l: ratio_slow_twitch_fibers=0.425
        Bhargava2004MuscleMetabolicsProbe_MetabolicMuscleParameter bifemlh_l: ratio_slow_twitch_fibers=0.5425
        Bhargava2004MuscleMetabolicsProbe_MetabolicMuscleParameter bifemsh_l: ratio_slow_twitch_fibers=0.529
        Bhargava2004MuscleMetabolicsProbe_MetabolicMuscleParameter sar_l: ratio_slow_twitch_fibers=0.5
        Bhargava2004MuscleMetabolicsProbe_MetabolicMuscleParameter add_long_l: ratio_slow_twitch_fibers=0.5
        Bhargava2004MuscleMetabolicsProbe_MetabolicMuscleParameter add_brev_l: ratio_slow_twitch_fibers=0.5
        Bhargava2004MuscleMetabolicsProbe_MetabolicMuscleParameter add_mag1_l: ratio_slow_twitch_fibers=0.552
        Bhargava2004MuscleMetabolicsProbe_MetabolicMuscleParameter add_mag2_l: ratio_slow_twitch_fibers=0.552
        Bhargava2004MuscleMetabolicsProbe_MetabolicMuscleParameter add_mag3_l: ratio_slow_twitch_fibers=0.552
        Bhargava2004MuscleMetabolicsProbe_MetabolicMuscleParameter tfl_l: ratio_slow_twitch_fibers=0.5
        Bhargava2004MuscleMetabolicsProbe_MetabolicMuscleParameter pect_l: ratio_slow_twitch_fibers=0.5
        Bhargava2004MuscleMetabolicsProbe_MetabolicMuscleParameter grac_l: ratio_slow_twitch_fibers=0.5
        Bhargava2004MuscleMetabolicsProbe_MetabolicMuscleParameter glut_max1_l: ratio_slow_twitch_fibers=0.55
        Bhargava2004MuscleMetabolicsProbe_MetabolicMuscleParameter glut_max2_l: ratio_slow_twitch_fibers=0.55
        Bhargava2004MuscleMetabolicsProbe_MetabolicMuscleParameter glut_max3_l: ratio_slow_twitch_fibers=0.55
        Bhargava2004MuscleMetabolicsProbe_MetabolicMuscleParameter iliacus_l: ratio_slow_twitch_fibers=0.5
        Bhargava2004MuscleMetabolicsProbe_MetabolicMuscleParameter psoas_l: ratio_slow_twitch_fibers=0.5
        Bhargava2004MuscleMetabolicsProbe_MetabolicMuscleParameter quad_fem_l: ratio_slow_twitch_fibers=0.5
        Bhargava2004MuscleMetabolicsProbe_MetabolicMuscleParameter gem_l: ratio_slow_twitch_fibers=0.5
        Bhargava2004MuscleMetabolicsProbe_MetabolicMuscleParameter peri_l: ratio_slow_twitch_fibers=0.5
        Bhargava2004MuscleMetabolicsProbe_MetabolicMuscleParameter rect_fem_l: ratio_slow_twitch_fibers=0.3865
        Bhargava2004MuscleMetabolicsProbe_MetabolicMuscleParameter vas_med_l: ratio_slow_twitch_fibers=0.503
        Bhargava2004MuscleMetabolicsProbe_MetabolicMuscleParameter vas_int_l: ratio_slow_twitch_fibers=0.543
        Bhargava2004MuscleMetabolicsProbe_MetabolicMuscleParameter vas_lat_l: ratio_slow_twitch_fibers=0.455
        Bhargava2004MuscleMetabolicsProbe_MetabolicMuscleParameter med_gas_l: ratio_slow_twitch_fibers=0.566
        Bhargava2004MuscleMetabolicsProbe_MetabolicMuscleParameter lat_gas_l: ratio_slow_twitch_fibers=0.507
        Bhargava2004MuscleMetabolicsProbe_MetabolicMuscleParameter soleus_l: ratio_slow_twitch_fibers=0.803
        Bhargava2004MuscleMetabolicsProbe_MetabolicMuscleParameter tib_post_l: ratio_slow_twitch_fibers=0.6
        Bhargava2004MuscleMetabolicsProbe_MetabolicMuscleParameter flex_dig_l: ratio_slow_twitch_fibers=0.6
        Bhargava2004MuscleMetabolicsProbe_MetabolicMuscleParameter flex_hal_l: ratio_slow_twitch_fibers=0.6
        Bhargava2004MuscleMetabolicsProbe_MetabolicMuscleParameter tib_ant_l: ratio_slow_twitch_fibers=0.7
        Bhargava2004MuscleMetabolicsProbe_MetabolicMuscleParameter per_brev_l: ratio_slow_twitch_fibers=0.6
        Bhargava2004MuscleMetabolicsProbe_MetabolicMuscleParameter per_long_l: ratio_slow_twitch_fibers=0.6
        Bhargava2004MuscleMetabolicsProbe_MetabolicMuscleParameter per_tert_l: ratio_slow_twitch_fibers=0.75
        Bhargava2004MuscleMetabolicsProbe_MetabolicMuscleParameter ext_dig_l: ratio_slow_twitch_fibers=0.75
        Bhargava2004MuscleMetabolicsProbe_MetabolicMuscleParameter ext_hal_l: ratio_slow_twitch_fibers=0.75
        Bhargava2004MuscleMetabolicsProbe_MetabolicMuscleParameter ercspn_r: ratio_slow_twitch_fibers=0.6
        Bhargava2004MuscleMetabolicsProbe_MetabolicMuscleParameter ercspn_l: ratio_slow_twitch_fibers=0.6
        Bhargava2004MuscleMetabolicsProbe_MetabolicMuscleParameter intobl_r: ratio_slow_twitch_fibers=0.56
        Bhargava2004MuscleMetabolicsProbe_MetabolicMuscleParameter intobl_l: ratio_slow_twitch_fibers=0.56
        Bhargava2004MuscleMetabolicsProbe_MetabolicMuscleParameter extobl_r: ratio_slow_twitch_fibers=0.58
        Bhargava2004MuscleMetabolicsProbe_MetabolicMuscleParameter extobl_l: ratio_slow_twitch_fibers=0.58
