# OpenSim document version 30000
ForceSet springactive_cmc_actuators:
  defaults: CoordinateActuator default: optimal_force=300
  CoordinateActuator reserve_hip_flexion_r: coordinate=hip_flexion_r optimal_force=1
  CoordinateActuator reserve_hip_adduction_r: coordinate=hip_adduction_r optimal_force=1
  CoordinateActuator reserve_hip_rotation_r: coordinate=hip_rotation_r optimal_force=1
  CoordinateActuator reserve_knee_angle_r: coordinate=knee_angle_r optimal_force=1
  CoordinateActuator reserve_ankle_angle_r: coordinate=ankle_angle_r optimal_force=1
  CoordinateActuator reserve_arm_flex_r: coordinate=arm_flex_r optimal_force=1
  CoordinateActuator reserve_arm_add_r: coordinate=arm_add_r optimal_force=1
  CoordinateActuator reserve_arm_rot_r: coordinate=arm_rot_r optimal_force=1
  CoordinateActuator reserve_elbow_flex_r: coordinate=elbow_flex_r optimal_force=1
  CoordinateActuator reserve_hip_flexion_l: coordinate=hip_flexion_l optimal_force=1
  CoordinateActuator reserve_hip_adduction_l: coordinate=hip_adduction_l optimal_force=1
  CoordinateActuator reserve_hip_rotation_l: coordinate=hip_rotation_l optimal_force=1
  CoordinateActuator reserve_knee_angle_l: coordinate=knee_angle_l optimal_force=1
  CoordinateActuator reserve_ankle_angle_l: coordinate=ankle_angle_l optimal_force=1
  CoordinateActuator reserve_arm_flex_l: coordinate=arm_flex_l optimal_force=1
  CoordinateActuator reserve_arm_add_l: coordinate=arm_add_l optimal_force=1
  CoordinateActuator reserve_arm_rot_l: coordinate=arm_rot_l optimal_force=1
  CoordinateActuator reserve_elbow_flex_l: coordinate=elbow_flex_l optimal_force=1
  CoordinateActuator reserve_lumbar_extension: coordinate=lumbar_extension optimal_force=1
  CoordinateActuator reserve_lumbar_bending: coordinate=lumbar_bending optimal_force=1
  CoordinateActuator reserve_lumbar_rotation: coordinate=lumbar_rotation optimal_force=1
  CoordinateActuator reserve_pro_sup_r: coordinate=pro_sup_r optimal_force=1
  CoordinateActuator reserve_pro_sup_l: coordinate=pro_sup_l optimal_force=1
