# OpenSim document version 30000
CMCTool loadedwalking_subject07_noload_free_trial02_cmc:
  model_file: subject07_adjusted.osim
  replace_force_set: false
  force_set_files: D:\computationalExperiments\loadedWalkingExperiment\subject07_noload_free_trial02\cmc_actuators_gait_23dofs_92muscles_patella.xml
  results_directory: results
  output_precision: 8
  initial_time: 0.55
  final_time: 1.5001
  solve_for_equilibrium_for_auxiliary_states: true
  maximum_number_of_integrator_steps: 30000
  maximum_integrator_step_size: 1
  minimum_integrator_step_size: 1e-8
  integrator_error_tolerance: 1e-5
  external_loads_file: external_loads.xml
  desired_kinematics_file: loadedwalking_subject07_noload_free_trial02_rrakin_Kinematics_q.sto
  task_set_file: tasks.xml
  lowpass_cutoff_frequency: -1
  cmc_time_window: 0.01
  use_fast_optimization_target: true
  optimizer_algorithm: cfsqp
  optimizer_max_iterations: 2000
  optimizer_print_level: 0
  use_verbose_printing: false
  AnalysisSet Analyses:
    ProbeReporter: start_time=-Inf end_time=Inf step_interval=10 in_degrees=true
